// SBML level 3 version 2

model Blood_Model()
  // model units - time: hour

  // Compartments:
  compartment plasma = 3126 millilitre;
  compartment blood_cells = 2558 millilitre;
  compartment lymph_node = 274 millilitre;

  // Species:
  species C_p in plasma = 100;  // substance in mole_per_litre
  species C_bc in blood_cells = 0;  // substance in mole_per_litre
  species C_ln in lymph_node = 0;  // substance in mole_per_litre

  // Parameters:
  C_is_lung = 0 mole_per_litre;
  C_p_heart = 0 mole_per_litre;
  C_p_kidney = 0 mole_per_litre;
  C_p_brain = 0 mole_per_litre;
  C_p_muscle = 0 mole_per_litre;
  C_p_marrow = 0 mole_per_litre;
  C_p_thymus = 0 mole_per_litre;
  C_p_skin = 0 mole_per_litre;
  C_p_fat = 0 mole_per_litre;
  C_p_other = 0 mole_per_litre;
  C_bc_heart = 0 mole_per_litre;
  C_bc_kidney = 0 mole_per_litre;
  C_bc_brain = 0 mole_per_litre;
  C_bc_muscle = 0 mole_per_litre;
  C_bc_marrow = 0 mole_per_litre;
  C_bc_thymus = 0 mole_per_litre;
  C_bc_skin = 0 mole_per_litre;
  C_bc_fat = 0 mole_per_litre;
  C_bc_other = 0 mole_per_litre;
  C_is_heart = 0 mole_per_litre;
  C_is_kidney = 0 mole_per_litre;
  C_is_brain = 0 mole_per_litre;
  C_is_muscle = 0 mole_per_litre;
  C_is_marrow = 0 mole_per_litre;
  C_is_thymus = 0 mole_per_litre;
  C_is_skin = 0 mole_per_litre;
  C_is_fat = 0 mole_per_litre;
  C_is_SI = 0 mole_per_litre;
  C_is_LI = 0 mole_per_litre;
  C_is_spleen = 0 mole_per_litre;
  C_is_pancreas = 0 mole_per_litre;
  C_is_other = 0 mole_per_litre;
  C_SAS_brain = 0 mole_per_litre;
  C_is_liver = 0 mole_per_litre;
  C_p_liver = 0 mole_per_litre;
  C_bc_liver = 0 mole_per_litre;
  Vp = 3126;
  Vbc = 2558;
  Vlymphnode = 274;
  Q_p_heart = 7752;
  Q_p_lung = 181913;
  Q_p_muscle = 33469;
  Q_p_skin = 11626;
  Q_p_fat = 11233;
  Q_p_marrow = 2591;
  Q_p_kidney = 36402;
  Q_p_liver = 13210;
  Q_p_SI = 12368;
  Q_p_LI = 12867;
  Q_p_pancreas = 3056;
  Q_p_thymus = 353;
  Q_p_spleen = 6343;
  Q_p_other = 5521;
  Q_p_brain = 21453;
  Q_CSF_brain = 24;
  Q_ECF_brain = 10.5;
  Q_bc_heart = 6342;
  Q_bc_lung = 148838;
  Q_bc_muscle = 27383;
  Q_bc_skin = 9512;
  Q_bc_fat = 9191;
  Q_bc_marrow = 2120;
  Q_bc_kidney = 29784;
  Q_bc_liver = 10808;
  Q_bc_SI = 10120;
  Q_bc_LI = 10527;
  Q_bc_pancreas = 2500;
  Q_bc_thymus = 289;
  Q_bc_spleen = 5189;
  Q_bc_other = 4517;
  Q_bc_brain = 17553;
  L_lung = 183;
  L_heart = 78;
  L_kidney = 364;
  L_brain = 215;
  L_muscle = 335;
  L_marrow = 26;
  L_thymus = 4;
  L_skin = 116;
  L_fat = 112;
  L_SI = 124;
  L_LI = 129;
  L_spleen = 63;
  L_pancreas = 31;
  L_liver = 132;
  L_other = 55;
  L_LN = 2000;
  sigma_L_lung = 0.2;
  sigma_L_heart = 0.2;
  sigma_L_kidney = 0.2;
  sigma_L_brain_ISF = 0.2;
  sigma_L_muscle = 0.2;
  sigma_L_marrow = 0.2;
  sigma_L_thymus = 0.2;
  sigma_L_skin = 0.2;
  sigma_L_fat = 0.2;
  sigma_L_SI = 0.2;
  sigma_L_LI = 0.2;
  sigma_L_spleen = 0.2;
  sigma_L_pancreas = 0.2;
  sigma_L_liver = 0.2;
  sigma_L_other = 0.2;
  sigma_L_SAS = 0.2;
  C_p_0 = 100;
  C_bc_0 = 0;
  C_ln_0 = 0;

  // Rate rules:
  C_p' = 1/Vp*(-(Q_p_lung + L_lung)*C_p + (Q_p_heart - L_heart)*C_p_heart + (Q_p_kidney - L_kidney)*C_p_kidney + (Q_p_brain - L_brain)*C_p_brain + (Q_p_muscle - L_muscle)*C_p_muscle + (Q_p_marrow - L_marrow)*C_p_marrow + (Q_p_thymus - L_thymus)*C_p_thymus + (Q_p_skin - L_skin)*C_p_skin + (Q_p_fat - L_fat)*C_p_fat + (Q_p_SI - L_SI + (Q_p_LI - L_LI) + (Q_p_spleen - L_spleen) + (Q_p_pancreas - L_pancreas) + (Q_p_liver - L_liver))*C_p_liver + (Q_p_other - L_other)*C_p_other + L_LN*C_ln);
  C_bc' = 1/Vbc*(-Q_bc_lung*C_bc + Q_bc_heart*C_bc_heart + Q_bc_kidney*C_bc_kidney + Q_bc_brain*C_bc_brain + Q_bc_muscle*C_bc_muscle + Q_bc_marrow*C_bc_marrow + Q_bc_thymus*C_bc_thymus + Q_bc_skin*C_bc_skin + Q_bc_fat*C_bc_fat + (Q_bc_SI + Q_bc_LI + Q_bc_spleen + Q_bc_pancreas + Q_bc_liver)*C_bc_liver + Q_bc_other*C_bc_other);
  C_ln' = 1/Vlymphnode*((1 - sigma_L_lung)*L_lung*C_is_lung + (1 - sigma_L_heart)*L_heart*C_is_heart + (1 - sigma_L_kidney)*L_kidney*C_is_kidney + (1 - sigma_L_SAS)*Q_CSF_brain*C_SAS_brain + (1 - sigma_L_brain_ISF)*Q_ECF_brain*C_is_brain + (1 - sigma_L_muscle)*L_muscle*C_is_muscle + (1 - sigma_L_marrow)*L_marrow*C_is_marrow + (1 - sigma_L_thymus)*L_thymus*C_is_thymus + (1 - sigma_L_skin)*L_skin*C_is_skin + (1 - sigma_L_fat)*L_fat*C_is_fat + (1 - sigma_L_SI)*L_SI*C_is_SI + (1 - sigma_L_LI)*L_LI*C_is_LI + (1 - sigma_L_spleen)*L_spleen*C_is_spleen + (1 - sigma_L_pancreas)*L_pancreas*C_is_pancreas + (1 - sigma_L_liver)*L_liver*C_is_liver + (1 - sigma_L_other)*L_other*C_is_other - L_LN*C_ln);
end
