// SBML level 3 version 2

model Brain_Model()
  // model units - time: hour

  // Compartments:
  compartment brain_plasma = 214.5 millilitre;
  compartment BBB_unbound = 7.25 millilitre;
  compartment BBB_bound = 7.25 millilitre;
  compartment brain_ISF = 275 millilitre;
  compartment brain_blood_cells = 175.5 millilitre;

  // Species:
  species C_p_brain in brain_plasma = 0;  // substance in mole_per_litre
  species C_BBB_unbound_brain in BBB_unbound = 0;  // substance in mole_per_litre
  species C_BBB_bound_brain in BBB_bound = 0;  // substance in mole_per_litre
  species C_is_brain in brain_ISF = 0;  // substance in mole_per_litre
  species C_bc_brain in brain_blood_cells = 0;  // substance in mole_per_litre

  // Parameters:
  C_p_lung = 0 mole_per_litre;
  C_bc_lung = 0 mole_per_litre;
  C_SAS_brain = 0 mole_per_litre;
  C_BCSFB_bound_brain = 0 mole_per_litre;
  Vp_brain = 214.5;
  VBBB_brain = 7.25;
  VIS_brain = 275;
  VBC_brain = 175.5;
  V_ES_brain = 7.25;
  Q_p_brain = 21453;
  Q_bc_brain = 17553;
  Q_ISF_brain = 10.5;
  Q_CSF_brain = 24;
  kon_FcRn = 0.1;
  koff_FcRn = 0.01;
  kdeg = 26.6;
  CLup_brain = 0.03;
  f_BBB = 0.15;
  FR = 0.15;
  FcRn_free_BBB = 1;
  sigma_V_BBB = 0.5;
  sigma_V_BCSFB = 0.9974;
  sigma_L_brain_ISF = 0.2;
  L_brain = 215;

  // Rate rules:
  C_p_brain' = 1/Vp_brain*(Q_p_brain*C_p_lung - (Q_p_brain - L_brain)*C_p_brain - (1 - sigma_V_BBB)*Q_ISF_brain*C_p_brain - (1 - sigma_V_BCSFB)*Q_CSF_brain*C_p_brain - CLup_brain*V_ES_brain*C_p_brain + CLup_brain*f_BBB*V_ES_brain*FR*C_BBB_bound_brain + CLup_brain*(1 - f_BBB)*V_ES_brain*FR*C_BCSFB_bound_brain);
  C_BBB_unbound_brain' = 1/VBBB_brain*(CLup_brain*f_BBB*V_ES_brain*(C_p_brain + C_is_brain) - VBBB_brain*kon_FcRn*C_BBB_unbound_brain*FcRn_free_BBB + VBBB_brain*koff_FcRn*C_BBB_bound_brain - VBBB_brain*kdeg*C_BBB_unbound_brain);
  C_BBB_bound_brain' = 1/VBBB_brain*(-CLup_brain*f_BBB*V_ES_brain*C_BBB_bound_brain + VBBB_brain*kon_FcRn*C_BBB_unbound_brain*FcRn_free_BBB - VBBB_brain*koff_FcRn*C_BBB_bound_brain);
  C_is_brain' = 1/VIS_brain*((1 - sigma_V_BBB)*Q_ISF_brain*C_p_brain - (1 - sigma_L_brain_ISF)*Q_ISF_brain*C_is_brain - Q_ISF_brain*C_is_brain + Q_ISF_brain*C_SAS_brain + CLup_brain*f_BBB*V_ES_brain*(1 - FR)*C_BBB_bound_brain - CLup_brain*f_BBB*V_ES_brain*C_is_brain);
  C_bc_brain' = 1/VBC_brain*(Q_bc_brain*C_bc_lung - Q_bc_brain*C_bc_brain);
end
