// SBML level 3 version 2

model CSF_Model()
  // model units - time: hour

  // Compartments:
  compartment BCSFB_unbound = 7.25 millilitre;
  compartment BCSFB_bound = 7.25 millilitre;
  compartment LV = 22.5 millilitre;
  compartment TFV = 22.5 millilitre;
  compartment CM = 7.5 millilitre;
  compartment SAS = 90 millilitre;

  // Species:
  species C_BCSFB_unbound_brain in BCSFB_unbound = 0;  // substance in mole_per_litre
  species C_BCSFB_bound_brain in BCSFB_bound = 0;  // substance in mole_per_litre
  species C_LV_brain in LV = 0;  // substance in mole_per_litre
  species C_TFV_brain in TFV = 0;  // substance in mole_per_litre
  species C_CM_brain in CM = 0;  // substance in mole_per_litre
  species C_SAS_brain in SAS = 0;  // substance in mole_per_litre

  // Parameters:
  C_p_brain = 0 mole_per_litre;
  C_is_brain = 0 mole_per_litre;
  V_BCSFB_brain = 7.25;
  V_LV_brain = 22.5;
  V_TFV_brain = 22.5;
  V_CM_brain = 7.5;
  V_SAS_brain = 90;
  V_ES_brain = 7.25;
  Q_CSF_brain = 24;
  Q_ISF_brain = 10.5;
  CLup_brain = 0.1;
  f_BBB = 0.15;
  f_BCSFB = 0.15;
  FR = 0.15;
  sigma_V_BCSFB = 0.9974;
  sigma_L_SAS = 0.2;
  kon_FcRn = 0.1;
  koff_FcRn = 0.01;
  kdeg = 26.6;
  FcRn_free_BCSFB = 1;
  f_LV = 0.5;
  C_BCSFB_unbound_brain_0 = 0;
  C_BCSFB_bound_brain_0 = 0;
  C_LV_brain_0 = 0;
  C_TFV_brain_0 = 0;
  C_CM_brain_0 = 0;
  C_SAS_brain_0 = 0;
  C_p_brain_0 = 0;
  C_is_brain_0 = 0;

  // Rate rules:
  C_BCSFB_unbound_brain' = 1/V_BCSFB_brain*(CLup_brain*f_BCSFB*V_ES_brain*C_p_brain + f_LV*CLup_brain*(1 - f_BBB)*V_ES_brain*C_LV_brain + (1 - f_LV)*CLup_brain*(1 - f_BBB)*V_ES_brain*C_TFV_brain - V_BCSFB_brain*kon_FcRn*C_BCSFB_unbound_brain*FcRn_free_BCSFB + V_BCSFB_brain*koff_FcRn*C_BCSFB_bound_brain - V_BCSFB_brain*kdeg*C_BCSFB_unbound_brain);
  C_BCSFB_bound_brain' = 1/V_BCSFB_brain*(-CLup_brain*(1 - f_BBB)*V_ES_brain*C_BCSFB_bound_brain + V_BCSFB_brain*kon_FcRn*C_BCSFB_unbound_brain*FcRn_free_BCSFB - V_BCSFB_brain*koff_FcRn*C_BCSFB_bound_brain);
  C_LV_brain' = 1/V_LV_brain*((1 - sigma_V_BCSFB)*f_LV*Q_CSF_brain*C_p_brain + f_LV*Q_ISF_brain*C_is_brain - (f_LV*Q_CSF_brain + f_LV*Q_ISF_brain)*C_LV_brain - f_LV*CLup_brain*(1 - f_BBB)*V_ES_brain*C_LV_brain + f_LV*CLup_brain*(1 - f_BBB)*V_ES_brain*(1 - FR)*C_BCSFB_bound_brain);
  C_TFV_brain' = 1/V_TFV_brain*((1 - sigma_V_BCSFB)*(1 - f_LV)*Q_CSF_brain*C_p_brain + (1 - f_LV)*Q_ISF_brain*C_is_brain - (Q_CSF_brain + Q_ISF_brain)*C_TFV_brain - (1 - f_LV)*CLup_brain*(1 - f_BBB)*V_ES_brain*C_TFV_brain + (1 - f_LV)*CLup_brain*(1 - f_BBB)*V_ES_brain*(1 - FR)*C_BCSFB_bound_brain + (f_LV*Q_CSF_brain + f_LV*Q_ISF_brain)*C_LV_brain);
  C_CM_brain' = 1/V_CM_brain*(Q_CSF_brain + Q_ISF_brain)*(C_TFV_brain - C_CM_brain);
  C_SAS_brain' = 1/V_SAS_brain*((Q_CSF_brain + Q_ISF_brain)*C_CM_brain - (1 - sigma_L_SAS)*Q_CSF_brain*C_SAS_brain - Q_ISF_brain*C_SAS_brain);
end
