// SBML level 3 version 2

model Liver_Model()
  // model units - time: hour

  // Compartments:
  compartment Vp_liver = 108 millilitre;
  compartment VBC_liver = 88.5 millilitre;
  compartment VIS_liver = 435 millilitre;
  compartment VES_liver = 10.8 millilitre;

  // Species:
  species C_p_liver in Vp_liver = 0;  // substance in mole_per_litre
  species C_bc_liver in VBC_liver = 0;  // substance in mole_per_litre
  species C_is_liver in VIS_liver = 0;  // substance in mole_per_litre
  species C_e_unbound_liver in VES_liver = 0;  // substance in mole_per_litre
  species C_e_bound_liver in VES_liver = 0;  // substance in mole_per_litre
  species FcRn_free_liver in VES_liver = 1;  // substance in mole_per_litre

  // Parameters:
  Vp_liver = 108;
  VBC_liver = 88.5;
  VIS_liver = 435;
  VES_liver = 10.8;
  Q_p_liver = 43200;
  Q_bc_liver = 35400;
  Q_p_spleen = 1080;
  Q_bc_spleen = 885;
  Q_p_pancreas = 1080;
  Q_bc_pancreas = 885;
  Q_p_SI = 4320;
  Q_bc_SI = 3540;
  Q_p_LI = 4320;
  Q_bc_LI = 3540;
  L_liver = 432;
  L_spleen = 10.8;
  L_pancreas = 10.8;
  L_SI = 43.2;
  L_LI = 43.2;
  kon_FcRn = 0.1;
  koff_FcRn = 0.01;
  kdeg = 26.6;
  CLup_liver = 0.05;
  sigma_V_liver = 0.95;
  sigma_L_liver = 0.2;
  FR = 0.15;
  C_p_liver_0 = 0;
  C_bc_liver_0 = 0;
  C_is_liver_0 = 0;
  C_e_unbound_liver_0 = 0;
  C_e_bound_liver_0 = 0;
  FcRn_free_liver_0 = 1;
  C_p_lung_0 = 0;
  C_bc_lung_0 = 0;
  C_p_spleen_0 = 0;
  C_bc_spleen_0 = 0;
  C_p_pancreas_0 = 0;
  C_bc_pancreas_0 = 0;
  C_p_SI_0 = 0;
  C_bc_SI_0 = 0;
  C_p_LI_0 = 0;
  C_bc_LI_0 = 0;
  C_p_lung = 0 mole_per_litre;
  C_bc_lung = 0 mole_per_litre;
  C_p_spleen = 0 mole_per_litre;
  C_bc_spleen = 0 mole_per_litre;
  C_p_pancreas = 0 mole_per_litre;
  C_bc_pancreas = 0 mole_per_litre;
  C_p_SI = 0 mole_per_litre;
  C_bc_SI = 0 mole_per_litre;
  C_p_LI = 0 mole_per_litre;
  C_bc_LI = 0 mole_per_litre;

  // Rate rules:
  C_p_liver' = 1/Vp_liver*(Q_p_liver*C_p_lung + (Q_p_spleen - L_spleen)*C_p_spleen + (Q_p_pancreas - L_pancreas)*C_p_pancreas + (Q_p_SI - L_SI)*C_p_SI + (Q_p_LI - L_LI)*C_p_LI - (Q_p_liver - L_liver + (Q_p_spleen - L_spleen) + (Q_p_pancreas - L_pancreas) + (Q_p_SI - L_SI) + (Q_p_LI - L_LI))*C_p_liver - (1 - sigma_V_liver)*L_liver*C_p_liver - CLup_liver*C_p_liver + CLup_liver*FR*C_e_bound_liver);
  C_bc_liver' = 1/VBC_liver*(Q_bc_liver*C_bc_lung + Q_bc_spleen*C_bc_spleen + Q_bc_pancreas*C_bc_pancreas + Q_bc_SI*C_bc_SI + Q_bc_LI*C_bc_LI - (Q_bc_liver + Q_bc_spleen + Q_bc_pancreas + Q_bc_SI + Q_bc_LI)*C_bc_liver);
  C_is_liver' = 1/VIS_liver*((1 - sigma_V_liver)*L_liver*C_p_liver - (1 - sigma_L_liver)*L_liver*C_is_liver + CLup_liver*(1 - FR)*C_e_bound_liver - CLup_liver*C_is_liver);
  C_e_unbound_liver' = 1/VES_liver*(CLup_liver*(C_p_liver + C_is_liver) - VES_liver*kon_FcRn*C_e_unbound_liver*FcRn_free_liver + VES_liver*koff_FcRn*C_e_bound_liver - kdeg*C_e_unbound_liver*VES_liver);
  C_e_bound_liver' = 1/VES_liver*(VES_liver*kon_FcRn*C_e_unbound_liver*FcRn_free_liver - VES_liver*koff_FcRn*C_e_bound_liver - CLup_liver*C_e_bound_liver);
  FcRn_free_liver' = 1/VES_liver*(koff_FcRn*C_e_bound_liver*VES_liver - kon_FcRn*C_e_unbound_liver*FcRn_free_liver*VES_liver + CLup_liver*C_e_bound_liver);
end
