// SBML level 3 version 2

model Lung_Model()
  // model units - time: hour

  // Compartments:
  compartment Vp_lung = 55 millilitre;
  compartment VBC_lung = 45 millilitre;
  compartment VIS_lung = 300 millilitre;
  compartment VES_lung = 5 millilitre;

  // Species:
  species C_p_lung in Vp_lung = 0;  // substance in mole_per_litre
  species C_bc_lung in VBC_lung = 0;  // substance in mole_per_litre
  species C_is_lung in VIS_lung = 0;  // substance in mole_per_litre
  species C_e_unbound_lung in VES_lung = 0;  // substance in mole_per_litre
  species C_e_bound_lung in VES_lung = 0;  // substance in mole_per_litre
  species FcRn_free_lung in VES_lung = 1;  // substance in mole_per_litre

  // Parameters:
  C_p = 0 mole_per_litre;
  C_bc = 0 mole_per_litre;
  Vp_lung = 55 dimensionless;
  VBC_lung = 45 dimensionless;
  VIS_lung = 300 dimensionless;
  VES_lung = 5 dimensionless;
  Q_p_lung = 181913 dimensionless;
  Q_bc_lung = 148838 dimensionless;
  L_lung = 183 dimensionless;
  kon_FcRn = 0.1 dimensionless;
  koff_FcRn = 0.01 dimensionless;
  kdeg = 26.6 dimensionless;
  CLup_lung = 0.1 dimensionless;
  FR = 0.15 dimensionless;
  sigma_V_lung = 0.2 dimensionless;
  sigma_L_lung = 0.2 dimensionless;
  C_p_lung_0 = 0 dimensionless;
  C_bc_lung_0 = 0 dimensionless;
  C_is_lung_0 = 0 dimensionless;
  C_e_unbound_lung_0 = 0 dimensionless;
  C_e_bound_lung_0 = 0 dimensionless;
  C_p_0 = 0 dimensionless;
  C_bc_0 = 0 dimensionless;
  FcRn_free_lung_0 = 1 dimensionless;

  // Rate rules:
  C_p_lung' = 1/Vp_lung*(Q_p_lung*C_p - (Q_p_lung - L_lung)*C_p_lung - (1 - sigma_V_lung)*L_lung*C_p_lung - CLup_lung*C_p_lung + CLup_lung*FR*C_e_bound_lung);
  C_bc_lung' = 1/VBC_lung*(Q_bc_lung*C_bc - Q_bc_lung*C_bc_lung);
  C_e_unbound_lung' = 1/VES_lung*(CLup_lung*(C_p_lung + C_is_lung) - VES_lung*kon_FcRn*C_e_unbound_lung*FcRn_free_lung + VES_lung*koff_FcRn*C_e_bound_lung - kdeg*C_e_unbound_lung*VES_lung);
  C_e_bound_lung' = 1/VES_lung*(VES_lung*kon_FcRn*C_e_unbound_lung*FcRn_free_lung - VES_lung*koff_FcRn*C_e_bound_lung - CLup_lung*C_e_bound_lung);
  C_is_lung' = 1/VIS_lung*((1 - sigma_V_lung)*L_lung*C_p_lung - (1 - sigma_L_lung)*L_lung*C_is_lung + CLup_lung*(1 - FR)*C_e_bound_lung - CLup_lung*C_is_lung);
  FcRn_free_lung' = 1/VES_lung*(koff_FcRn*C_e_bound_lung*VES_lung - kon_FcRn*C_e_unbound_lung*FcRn_free_lung*VES_lung + CLup_lung*C_e_bound_lung);
end
