// SBML level 3 version 2

model PBPK_Model()
  // model units - time: hour

  // Compartments:
  compartment plasma = 3126 millilitre;
  compartment blood_cells = 2558 millilitre;
  compartment lymph_node = 274 millilitre;
  compartment Vp_lung = 55 millilitre;
  compartment VBC_lung = 45 millilitre;
  compartment VIS_lung = 126 millilitre;
  compartment VES_lung = 0.1 millilitre;
  compartment brain_plasma = 12 millilitre;
  compartment BBB_unbound = 0.1 millilitre;
  compartment BBB_bound = 0.1 millilitre;
  compartment brain_ISF = 180 millilitre;
  compartment brain_blood_cells = 10 millilitre;
  compartment BCSFB_unbound = 0.1 millilitre;
  compartment BCSFB_bound = 0.1 millilitre;
  compartment LV = 20 millilitre;
  compartment TFV = 20 millilitre;
  compartment CM = 7.5 millilitre;
  compartment SAS = 90 millilitre;
  compartment Vp_liver = 100 millilitre;
  compartment VBC_liver = 82 millilitre;
  compartment VIS_liver = 230 millilitre;
  compartment VES_liver = 0.1 millilitre;

  // Species:
  species C_p in plasma = 10;  // substance in mole_per_litre
  species C_bc in blood_cells = 0;  // substance in mole_per_litre
  species C_ln in lymph_node = 0;  // substance in mole_per_litre
  species C_p_lung in Vp_lung = 0;  // substance in mole_per_litre
  species C_bc_lung in VBC_lung = 0;  // substance in mole_per_litre
  species C_is_lung in VIS_lung = 0;  // substance in mole_per_litre
  species C_e_unbound_lung in VES_lung = 0;  // substance in mole_per_litre
  species C_e_bound_lung in VES_lung = 0;  // substance in mole_per_litre
  species FcRn_free_lung in VES_lung = 0;  // substance in mole_per_litre
  species C_p_brain in brain_plasma = 0;  // substance in mole_per_litre
  species C_BBB_unbound_brain in BBB_unbound = 0;  // substance in mole_per_litre
  species C_BBB_bound_brain in BBB_bound = 0;  // substance in mole_per_litre
  species C_is_brain in brain_ISF = 0;  // substance in mole_per_litre
  species C_bc_brain in brain_blood_cells = 0;  // substance in mole_per_litre
  species C_BCSFB_unbound_brain in BCSFB_unbound = 0;  // substance in mole_per_litre
  species C_BCSFB_bound_brain in BCSFB_bound = 0;  // substance in mole_per_litre
  species C_LV_brain in LV = 0;  // substance in mole_per_litre
  species C_TFV_brain in TFV = 0;  // substance in mole_per_litre
  species C_CM_brain in CM = 0;  // substance in mole_per_litre
  species C_SAS_brain in SAS = 0;  // substance in mole_per_litre
  species C_p_liver in Vp_liver = 0;  // substance in mole_per_litre
  species C_bc_liver in VBC_liver = 0;  // substance in mole_per_litre
  species C_is_liver in VIS_liver = 0;  // substance in mole_per_litre
  species C_e_unbound_liver in VES_liver = 0;  // substance in mole_per_litre
  species C_e_bound_liver in VES_liver = 0;  // substance in mole_per_litre
  species FcRn_free_liver in VES_liver = 1;  // substance in mole_per_litre

  // Parameters:
  C_p_0 = 10;
  C_bc_0 = 0;
  C_ln_0 = 0;
  C_p_lung_0 = 0;
  C_bc_lung_0 = 0;
  C_is_lung_0 = 0;
  C_e_unbound_lung_0 = 0;
  C_e_bound_lung_0 = 0;
  FcRn_free_lung_0 = 0;
  C_p_brain_0 = 0;
  C_BBB_unbound_brain_0 = 0;
  C_BBB_bound_brain_0 = 0;
  C_is_brain_0 = 0;
  C_bc_brain_0 = 0;
  C_BCSFB_unbound_brain_0 = 0;
  C_BCSFB_bound_brain_0 = 0;
  C_LV_brain_0 = 0;
  C_TFV_brain_0 = 0;
  C_CM_brain_0 = 0;
  C_SAS_brain_0 = 0;
  C_p_liver_0 = 0;
  C_bc_liver_0 = 0;
  C_is_liver_0 = 0;
  C_e_unbound_liver_0 = 0;
  C_e_bound_liver_0 = 0;
  FcRn_free_liver_0 = 1;
  Q_p_lung = 181913;
  Q_p_heart = 0;
  Q_p_kidney = 0;
  Q_p_brain = 21453;
  Q_p_muscle = 0;
  Q_p_marrow = 0;
  Q_p_thymus = 0;
  Q_p_skin = 0;
  Q_p_fat = 0;
  Q_p_liver = 13210;
  Q_p_spleen = 6343;
  Q_p_pancreas = 3056;
  Q_p_SI = 12368;
  Q_p_LI = 12867;
  Q_p_other = 0;
  Q_bc_lung = 148838;
  Q_bc_heart = 0;
  Q_bc_kidney = 0;
  Q_bc_brain = 17553;
  Q_bc_muscle = 0;
  Q_bc_marrow = 0;
  Q_bc_thymus = 0;
  Q_bc_skin = 0;
  Q_bc_fat = 0;
  Q_bc_liver = 10808;
  Q_bc_spleen = 5189;
  Q_bc_pancreas = 2500;
  Q_bc_SI = 10120;
  Q_bc_LI = 10527;
  Q_bc_other = 0;
  L_lung = 183;
  L_heart = 0;
  L_kidney = 0;
  L_brain = 215;
  L_muscle = 0;
  L_marrow = 0;
  L_thymus = 0;
  L_skin = 0;
  L_fat = 0;
  L_liver = 132;
  L_spleen = 63;
  L_pancreas = 31;
  L_SI = 124;
  L_LI = 129;
  L_other = 0;
  L_LN = 0;
  Q_CSF_brain = 24;
  Q_ISF_brain = 10.5;
  sigma_V_lung = 0.95;
  sigma_L_lung = 0.2;
  sigma_V_BBB = 0.95;
  sigma_L_brain_ISF = 0.2;
  sigma_L_SAS = 0.2;
  sigma_V_BCSFB = 0.95;
  sigma_V_liver = 0.95;
  sigma_L_liver = 0.2;
  kon_FcRn = 0.1;
  koff_FcRn = 0.01;
  kdeg = 26.6;
  FR = 0.15;
  CLup_lung = 0.1;
  CLup_brain = 0.1;
  CLup_liver = 0.1;
  f_BBB = 0.5;
  f_LV = 0.5;
  V_ES_brain = 0;
  VBBB_brain = 0.1;
  FcRn_free_BBB = 0;

  // Rate rules:
  C_p' = 1/Vp*(-(Q_p_lung + L_lung)*C_p + (Q_p_heart - L_heart)*C_p_heart + (Q_p_kidney - L_kidney)*C_p_kidney + (Q_p_brain - L_brain)*C_p_brain + (Q_p_muscle - L_muscle)*C_p_muscle + (Q_p_marrow - L_marrow)*C_p_marrow + (Q_p_thymus - L_thymus)*C_p_thymus + (Q_p_skin - L_skin)*C_p_skin + (Q_p_fat - L_fat)*C_p_fat + (Q_p_SI - L_SI + (Q_p_LI - L_LI) + (Q_p_spleen - L_spleen) + (Q_p_pancreas - L_pancreas) + (Q_p_liver - L_liver))*C_p_liver + (Q_p_other - L_other)*C_p_other + L_LN*C_ln);
  C_bc' = 1/Vbc*(-Q_bc_lung*C_bc + Q_bc_heart*C_bc_heart + Q_bc_kidney*C_bc_kidney + Q_bc_brain*C_bc_brain + Q_bc_muscle*C_bc_muscle + Q_bc_marrow*C_bc_marrow + Q_bc_thymus*C_bc_thymus + Q_bc_skin*C_bc_skin + Q_bc_fat*C_bc_fat + (Q_bc_SI + Q_bc_LI + Q_bc_spleen + Q_bc_pancreas + Q_bc_liver)*C_bc_liver + Q_bc_other*C_bc_other);
  C_ln' = 1/Vlymphnode*((1 - sigma_L_lung)*L_lung*C_is_lung + (1 - sigma_L_heart)*L_heart*C_is_heart + (1 - sigma_L_kidney)*L_kidney*C_is_kidney + (1 - sigma_L_SAS)*Q_CSF_brain*C_SAS_brain + (1 - sigma_L_brain_ISF)*Q_ISF_brain*C_is_brain + (1 - sigma_L_muscle)*L_muscle*C_is_muscle + (1 - sigma_L_marrow)*L_marrow*C_is_marrow + (1 - sigma_L_thymus)*L_thymus*C_is_thymus + (1 - sigma_L_skin)*L_skin*C_is_skin + (1 - sigma_L_fat)*L_fat*C_is_fat + (1 - sigma_L_SI)*L_SI*C_is_SI + (1 - sigma_L_LI)*L_LI*C_is_LI + (1 - sigma_L_spleen)*L_spleen*C_is_spleen + (1 - sigma_L_pancreas)*L_pancreas*C_is_pancreas + (1 - sigma_L_liver)*L_liver*C_is_liver + (1 - sigma_L_other)*L_other*C_is_other - L_LN*C_ln);
  C_p_lung' = 1/Vp_lung*(Q_p_lung*C_p - Q_p_lung*C_p_lung - (1 - sigma_V_lung)*L_lung*C_p_lung - CLup_lung*C_p_lung + CLup_lung*FR*C_e_bound_lung);
  C_bc_lung' = 1/VBC_lung*(Q_bc_lung*C_bc - Q_bc_lung*C_bc_lung);
  C_e_unbound_lung' = 1/VES_lung*(CLup_lung*(C_p_lung + C_is_lung) - VES_lung*kon_FcRn*C_e_unbound_lung*FcRn_free_lung + VES_lung*koff_FcRn*C_e_bound_lung - kdeg*C_e_unbound_lung*VES_lung);
  C_e_bound_lung' = 1/VES_lung*(VES_lung*kon_FcRn*C_e_unbound_lung*FcRn_free_lung - VES_lung*koff_FcRn*C_e_bound_lung - CLup_lung*C_e_bound_lung);
  C_is_lung' = 1/VIS_lung*((1 - sigma_V_lung)*L_lung*C_p_lung - (1 - sigma_L_lung)*L_lung*C_is_lung + CLup_lung*(1 - FR)*C_e_bound_lung - CLup_lung*C_is_lung);
  FcRn_free_lung' = 1/VES_lung*(koff_FcRn*C_e_bound_lung*VES_lung - kon_FcRn*C_e_unbound_lung*FcRn_free_lung*VES_lung + CLup_lung*C_e_bound_lung);
  C_p_brain' = 1/Vp_brain*(Q_p_brain*C_p_lung - (Q_p_brain - L_brain)*C_p_brain - (1 - sigma_V_BBB)*Q_ISF_brain*C_p_brain - (1 - sigma_V_BCSFB)*Q_CSF_brain*C_p_brain - CLup_brain*V_ES_brain*C_p_brain + CLup_brain*f_BBB*V_ES_brain*FR*C_BBB_bound_brain + CLup_brain*(1 - f_BBB)*V_ES_brain*FR*C_BCSFB_bound_brain);
  C_BBB_unbound_brain' = 1/VBBB_brain*(CLup_brain*f_BBB*V_ES_brain*(C_p_brain + C_is_brain) - VBBB_brain*kon_FcRn*C_BBB_unbound_brain*FcRn_free_BBB + VBBB_brain*koff_FcRn*C_BBB_bound_brain - VBBB_brain*kdeg*C_BBB_unbound_brain);
  C_BBB_bound_brain' = 1/VBBB_brain*(-CLup_brain*f_BBB*V_ES_brain*C_BBB_bound_brain + VBBB_brain*kon_FcRn*C_BBB_unbound_brain*FcRn_free_BBB - VBBB_brain*koff_FcRn*C_BBB_bound_brain);
  C_is_brain' = 1/VIS_brain*((1 - sigma_V_BBB)*Q_ISF_brain*C_p_brain - (1 - sigma_L_brain_ISF)*Q_ISF_brain*C_is_brain - Q_ISF_brain*C_is_brain + Q_ISF_brain*C_SAS_brain + CLup_brain*f_BBB*V_ES_brain*(1 - FR)*C_BBB_bound_brain - CLup_brain*f_BBB*V_ES_brain*C_is_brain);
  C_BCSFB_unbound_brain' = 1/V_BCSFB_brain*(CLup_brain*(1 - f_BBB)*V_ES_brain*(C_p_brain + C_LV_brain + C_TFV_brain) - V_BCSFB_brain*kon_FcRn*C_BCSFB_unbound_brain*FcRn_free_BCSFB + V_BCSFB_brain*koff_FcRn*C_BCSFB_bound_brain - V_BCSFB_brain*kdeg*C_BCSFB_unbound_brain);
  C_BCSFB_bound_brain' = 1/V_BCSFB_brain*(-CLup_brain*(1 - f_BBB)*V_ES_brain*C_BCSFB_bound_brain + V_BCSFB_brain*kon_FcRn*C_BCSFB_unbound_brain*FcRn_free_BCSFB - V_BCSFB_brain*koff_FcRn*C_BCSFB_bound_brain);
  C_LV_brain' = 1/V_LV_brain*((1 - sigma_V_BCSFB)*f_LV*Q_CSF_brain*C_p_brain + f_LV*Q_ISF_brain*C_is_brain - (f_LV*Q_CSF_brain + f_LV*Q_ISF_brain)*C_LV_brain - f_LV*CLup_brain*(1 - f_BBB)*V_ES_brain*C_LV_brain + f_LV*CLup_brain*(1 - f_BBB)*V_ES_brain*(1 - FR)*C_BCSFB_bound_brain);
  C_TFV_brain' = 1/V_TFV_brain*((1 - sigma_V_BCSFB)*(1 - f_LV)*Q_CSF_brain*C_p_brain + (1 - f_LV)*Q_ISF_brain*C_is_brain - (Q_CSF_brain + Q_ISF_brain)*C_TFV_brain - (1 - f_LV)*CLup_brain*(1 - f_BBB)*V_ES_brain*C_TFV_brain + (1 - f_LV)*CLup_brain*(1 - f_BBB)*V_ES_brain*(1 - FR)*C_BCSFB_bound_brain + (f_LV*Q_CSF_brain + f_LV*Q_ISF_brain)*C_LV_brain);
  C_CM_brain' = 1/V_CM_brain*(Q_CSF_brain + Q_ISF_brain)*(C_TFV_brain - C_CM_brain);
  C_SAS_brain' = 1/V_SAS_brain*((Q_CSF_brain + Q_ISF_brain)*C_CM_brain - (1 - sigma_L_SAS)*Q_CSF_brain*C_SAS_brain - Q_ISF_brain*C_SAS_brain);
  C_p_liver' = 1/Vp_liver*(Q_p_liver*C_p_lung + Q_p_spleen*C_p_spleen + Q_p_pancreas*C_p_pancreas + Q_p_SI*C_p_SI + Q_p_LI*C_p_LI - (Q_p_liver - L_liver + (Q_p_spleen - L_spleen) + (Q_p_pancreas - L_pancreas) + (Q_p_SI - L_SI) + (Q_p_LI - L_LI))*C_p_liver - (1 - sigma_V_liver)*L_liver*C_p_liver - CLup_liver*C_p_liver + CLup_liver*FR*C_e_bound_liver);
  C_bc_liver' = 1/VBC_liver*(Q_bc_liver*C_bc_lung + Q_bc_spleen*C_bc_spleen + Q_bc_pancreas*C_bc_pancreas + Q_bc_SI*C_bc_SI + Q_bc_LI*C_bc_LI - (Q_bc_liver + Q_bc_spleen + Q_bc_pancreas + Q_bc_SI + Q_bc_LI)*C_bc_liver);
  C_is_liver' = 1/VIS_liver*((1 - sigma_V_liver)*L_liver*C_p_liver - (1 - sigma_L_liver)*L_liver*C_is_liver + CLup_liver*(1 - FR)*C_e_bound_liver - CLup_liver*C_is_liver);
  C_e_unbound_liver' = 1/VES_liver*(CLup_liver*(C_p_liver + C_is_liver) - VES_liver*kon_FcRn*C_e_unbound_liver*FcRn_free_liver + VES_liver*koff_FcRn*C_e_bound_liver - kdeg*C_e_unbound_liver*VES_liver);
  C_e_bound_liver' = 1/VES_liver*(VES_liver*kon_FcRn*C_e_unbound_liver*FcRn_free_liver - VES_liver*koff_FcRn*C_e_bound_liver - CLup_liver*C_e_bound_liver);
  FcRn_free_liver' = 1/VES_liver*(koff_FcRn*C_e_bound_liver*VES_liver - kon_FcRn*C_e_unbound_liver*FcRn_free_liver*VES_liver + CLup_liver*C_e_bound_liver);
end
