// SBML level 3 version 2

model Aldea_Extended_Model()
  // model units - time: day

  // Compartments:
  compartment absorption_site = 1 litre;
  compartment central = 3.52 litre;
  compartment peripheral = 6.38 litre;
  compartment local_amyloid = 1 dimensionless;
  compartment VWD_compartment = 1 dimensionless;

  // Species:
  substanceOnly species A in absorption_site = 0;  // substance in milligram
  species C in central = 0;  // substance in milligram_per_litre
  species Cp in peripheral = 0;  // substance in milligram_per_litre
  substanceOnly species A_beta in local_amyloid = 3.2;  // substance in dimensionless
  substanceOnly species VWD in VWD_compartment = 0;  // substance in dimensionless
  substanceOnly species BGTS in VWD_compartment;
  substanceOnly species APP in local_amyloid = 1;  // substance in dimensionless
  substanceOnly species C83 in local_amyloid = 1;  // substance in dimensionless
  substanceOnly species C99 in local_amyloid = 1;  // substance in dimensionless
  substanceOnly species p3 in local_amyloid = 1;  // substance in dimensionless

  // Parameters:
  F = 0.494;
  D1 = 0.0821;
  KA = 0.22;
  CL = 0.336;
  Vc = 3.52;
  Q = 0.869;
  Vp = 6.38;
  Dsc has milligram;
  Div has milligram;
  alpha_removal = 0.000126;
  k_repair = 0.0124;
  A_beta0 = 3.2;
  VWD0 = 0;
  BGTS_max = 60;
  EG50 = 1;
  pow = 3.72;
  vr0 = 1;
  Vm1 = 1.1;
  Vm2 = 0.153;
  Vm3 = 14.6;
  Vm4 = 1;
  Vm5 = 0.0223;
  Km1 = 0.0186;
  Km2 = 1.64;
  Km3 = 28.8;
  Km4 = 0.915;
  Km5 = 0.0672;
  APP0 = 1;
  C83_0 = 1;
  C99_0 = 1;
  p3_0 = 1;

  // Assignment rules:
  Dsc := piecewise(0, BGTS > 4, piecewise(450, (time >= 0) && (time < 0 + D1), 450, (time >= 28) && (time < 28 + D1), 900, (time >= 56) && (time < 56 + D1), 900, (time >= 84) && (time < 84 + D1), 1200, (time >= 112) && (time < 112 + D1), 1200, (time >= 140) && (time < 140 + D1), 1200, (time >= 168) && (time < 168 + D1), 1200, (time >= 196) && (time < 196 + D1), 1200, (time >= 224) && (time < 224 + D1), 1200, (time >= 252) && (time < 252 + D1), 1200, (time >= 280) && (time < 280 + D1), 1200, (time >= 308) && (time < 308 + D1), 1200, (time >= 336) && (time < 336 + D1), 1200, (time >= 364) && (time < 364 + D1), 1200, (time >= 392) && (time < 392 + D1), 1200, (time >= 420) && (time < 420 + D1), 1200, (time >= 448) && (time < 448 + D1), 1200, (time >= 476) && (time < 476 + D1), 1200, (time >= 504) && (time < 504 + D1), 1200, (time >= 532) && (time < 532 + D1), 1200, (time >= 560) && (time < 560 + D1), 1200, (time >= 588) && (time < 588 + D1), 1200, (time >= 616) && (time < 616 + D1), 1200, (time >= 644) && (time < 644 + D1), 1200, (time >= 672) && (time < 672 + D1), 1200, (time >= 700) && (time < 700 + D1), 1200, (time >= 728) && (time < 728 + D1), 1200, (time >= 756) && (time < 756 + D1), 1200, (time >= 784) && (time < 784 + D1), 1200, (time >= 812) && (time < 812 + D1), 1200, (time >= 840) && (time < 840 + D1), 0));
  Div := piecewise(0, (time >= 0) && (time < 0 + 0.001), 0, (time >= 28) && (time < 28 + 0.001), 0, (time >= 56) && (time < 56 + 0.001), 0, (time >= 84) && (time < 84 + 0.001), 0, (time >= 112) && (time < 112 + 0.001), 0, (time >= 140) && (time < 140 + 0.001), 0, (time >= 168) && (time < 168 + 0.001), 0, (time >= 196) && (time < 196 + 0.001), 0, (time >= 224) && (time < 224 + 0.001), 0, (time >= 252) && (time < 252 + 0.001), 0, (time >= 280) && (time < 280 + 0.001), 0, (time >= 308) && (time < 308 + 0.001), 0, (time >= 336) && (time < 336 + 0.001), 0, (time >= 364) && (time < 364 + 0.001), 0, (time >= 392) && (time < 392 + 0.001), 0, (time >= 420) && (time < 420 + 0.001), 0, (time >= 448) && (time < 448 + 0.001), 0, (time >= 476) && (time < 476 + 0.001), 0, (time >= 504) && (time < 504 + 0.001), 0, (time >= 532) && (time < 532 + 0.001), 0, (time >= 560) && (time < 560 + 0.001), 0, (time >= 588) && (time < 588 + 0.001), 0, (time >= 616) && (time < 616 + 0.001), 0, (time >= 644) && (time < 644 + 0.001), 0, (time >= 672) && (time < 672 + 0.001), 0, (time >= 700) && (time < 700 + 0.001), 0, (time >= 728) && (time < 728 + 0.001), 0, (time >= 756) && (time < 756 + 0.001), 0, (time >= 784) && (time < 784 + 0.001), 0, (time >= 812) && (time < 812 + 0.001), 0, (time >= 840) && (time < 840 + 0.001), 0);
  BGTS := BGTS_max*(VWD/EG50)^pow/(1 + (VWD/EG50)^pow);

  // Reactions:
  absorption: A => C; KA*A;
  sc_dosing: => A; F*Dsc/D1;
  iv_dosing: => C; Div;
  central_to_peripheral: C => Cp; Q*C;
  peripheral_to_central: Cp => C; Q*Cp;
  elimination: C => ; CL*C;
  amyloid_degradation: A_beta => ; alpha_removal*C*A_beta;
  vwd_production: => VWD; alpha_removal*C*A_beta;
  vwd_degradation: VWD => ; k_repair*VWD;
  app_production: => APP; vr0;
  app_to_c83: APP => C83; Vm1*APP/Km1/(1 + APP/Km1 + C99/Km5);
  app_to_c99: APP => C99; Vm2*APP/Km2/(1 + APP/Km2);
  c83_to_p3: C83 => p3; Vm3*C83/Km3/(1 + C83/Km3 + C99/Km4);
  c99_to_abeta: C99 => A_beta; Vm4*C99/Km4/(1 + C83/Km3 + C99/Km4);
  c99_to_c83: C99 => C83; Vm5*C99/Km5/(1 + APP/Km1 + C99/Km5);
end
