// SBML level 3 version 2

model Retout_Model()
  // model units - time: day

  // Compartments:
  compartment absorption_site = 1 litre;
  compartment central = 3.52 litre;
  compartment peripheral = 6.38 litre;
  compartment effect_compartment = 1 dimensionless;

  // Species:
  substanceOnly species A in absorption_site = 0;  // substance in milligram
  species C in central = 0;  // substance in milligram_per_litre
  species Cp in peripheral = 0;  // substance in milligram_per_litre
  substanceOnly species Ce in effect_compartment = 0;  // substance in dimensionless
  substanceOnly species SUVR in effect_compartment;
  substanceOnly species ARIA_hazard in effect_compartment;  // substance in dimensionless

  // Parameters:
  F = 0.494;
  D1 = 0.0821;
  KA = 0.22;
  CL = 0.336;
  Vc = 3.52;
  Q = 0.869;
  Vp = 6.38;
  Dsc has milligram;
  Div has milligram;
  Ke0 = 1740;
  SLOP = 0.019;
  power = 0.716;
  SUVR_0 = 1.8;
  BSAPOE4_non = 8.7e-6;
  BSAPOE4_carrier = 3.56e-5;
  T50 = 323;
  gamma = 2.15;
  Emax = 6.05;
  EC50 = 8.6;

  // Assignment rules:
  Dsc := piecewise(1200, (time >= 0) && (time < 0 + D1), 1200, (time >= 28) && (time < 28 + D1), 1200, (time >= 56) && (time < 56 + D1), 1200, (time >= 84) && (time < 84 + D1), 1200, (time >= 112) && (time < 112 + D1), 1200, (time >= 140) && (time < 140 + D1), 1200, (time >= 168) && (time < 168 + D1), 1200, (time >= 196) && (time < 196 + D1), 1200, (time >= 224) && (time < 224 + D1), 1200, (time >= 252) && (time < 252 + D1), 1200, (time >= 280) && (time < 280 + D1), 1200, (time >= 308) && (time < 308 + D1), 1200, (time >= 336) && (time < 336 + D1), 1200, (time >= 364) && (time < 364 + D1), 1200, (time >= 392) && (time < 392 + D1), 1200, (time >= 420) && (time < 420 + D1), 1200, (time >= 448) && (time < 448 + D1), 1200, (time >= 476) && (time < 476 + D1), 1200, (time >= 504) && (time < 504 + D1), 1200, (time >= 532) && (time < 532 + D1), 1200, (time >= 560) && (time < 560 + D1), 1200, (time >= 588) && (time < 588 + D1), 1200, (time >= 616) && (time < 616 + D1), 1200, (time >= 644) && (time < 644 + D1), 1200, (time >= 672) && (time < 672 + D1), 1200, (time >= 700) && (time < 700 + D1), 1200, (time >= 728) && (time < 728 + D1), 0);
  Div := piecewise(1, (time >= 0) && (time < 0 + 0.001), 3, (time >= 28) && (time < 28 + 0.001), 6, (time >= 56) && (time < 56 + 0.001), 10, (time >= 84) && (time < 84 + 0.001), 10, (time >= 112) && (time < 112 + 0.001), 10, (time >= 140) && (time < 140 + 0.001), 10, (time >= 168) && (time < 168 + 0.001), 10, (time >= 196) && (time < 196 + 0.001), 10, (time >= 224) && (time < 224 + 0.001), 10, (time >= 252) && (time < 252 + 0.001), 10, (time >= 280) && (time < 280 + 0.001), 10, (time >= 308) && (time < 308 + 0.001), 10, (time >= 336) && (time < 336 + 0.001), 0);
  SUVR := SUVR_0*(1 - SLOP*Ce^power);
  ARIA_hazard := ln(BSAPOE4_carrier) + Emax*C/(C + EC50)*T50^gamma/(T50^gamma + time^gamma);

  // Reactions:
  absorption: A => C; KA*A;
  sc_dosing: => A; F*Dsc/D1;
  iv_dosing: => C; Div;
  central_to_peripheral: C => Cp; Q*C;
  peripheral_to_central: Cp => C; Q*Cp;
  elimination: C => ; CL*C;
  effect_compartment_kinetics: => Ce; Ke0*(C - Ce);
end
