// SBML level 3 version 2

model Combined_Brain_CSF_Model()
  // model units - time: hour

  // Compartments:
  compartment brain_plasma = 31.9 millilitre;
  compartment BBB_unbound = 0.1 millilitre;
  compartment BBB_bound = 0.1 millilitre;
  compartment brain_ISF = 261 millilitre;
  compartment brain_blood_cells = 26.1 millilitre;
  compartment BCSFB_unbound = 0.1 millilitre;
  compartment BCSFB_bound = 0.1 millilitre;
  compartment LV = 22.5 millilitre;
  compartment TFV = 22.5 millilitre;
  compartment CM = 7.5 millilitre;
  compartment SAS = 90 millilitre;

  // Species:
  species C_p_brain in brain_plasma = 0;  // substance in mole_per_litre
  species C_BBB_unbound_brain in BBB_unbound = 0;  // substance in mole_per_litre
  species C_BBB_bound_brain in BBB_bound = 0;  // substance in mole_per_litre
  species C_is_brain in brain_ISF = 0;  // substance in mole_per_litre
  species C_bc_brain in brain_blood_cells = 0;  // substance in mole_per_litre
  species C_BCSFB_unbound_brain in BCSFB_unbound = 0;  // substance in mole_per_litre
  species C_BCSFB_bound_brain in BCSFB_bound = 0;  // substance in mole_per_litre
  species C_LV_brain in LV = 0;  // substance in mole_per_litre
  species C_TFV_brain in TFV = 0;  // substance in mole_per_litre
  species C_CM_brain in CM = 0;  // substance in mole_per_litre
  species C_SAS_brain in SAS = 0;  // substance in mole_per_litre

  // Parameters:
  Vp_brain = 31.9;
  VBBB_brain = 0.1;
  VIS_brain = 261;
  VBC_brain = 26.1;
  V_ES_brain = 7.25;
  Q_p_brain = 36402;
  Q_bc_brain = 29810;
  Q_ISF_brain = 10.5;
  Q_CSF_brain = 21;
  kon_FcRn = 559000000;
  koff_FcRn = 23.9;
  kdeg = 26.6;
  CLup_brain = 0.3;
  f_BBB = 0.95;
  FR = 0.715;
  FcRn_free_BBB = 1;
  sigma_V_BBB = 0.95;
  sigma_V_BCSFB = 0.9974;
  sigma_L_brain_ISF = 0.2;
  L_brain = 73;
  V_BCSFB_brain = 0.1;
  V_LV_brain = 22.5;
  V_TFV_brain = 22.5;
  V_CM_brain = 7.5;
  V_SAS_brain = 90;
  Q_CSF_brain = 21;
  f_BCSFB = 0.2;
  sigma_L_SAS = 0.2;
  FcRn_free_BCSFB = 1;
  f_LV = 0.2;
  C_LV_brain_0 = 0;
  C_TFV_brain_0 = 0;
  C_CM_brain_0 = 0;
  C_SAS_brain_0 = 0;
  C_p_brain_0 = 0;
  C_is_brain_0 = 0;
  C_p_lung_0 = 4.516315;
  C_bc_lung_0 = 0;
  C_p_lung = 4.516315 mole_per_litre;
  C_bc_lung = 0 mole_per_litre;

  // Rate rules:
  C_p_brain' = 1/Vp_brain*(Q_p_brain*C_p_lung - (Q_p_brain - L_brain)*C_p_brain - (1 - sigma_V_BBB)*Q_ISF_brain*C_p_brain - (1 - sigma_V_BCSFB)*Q_CSF_brain*C_p_brain - CLup_brain*V_ES_brain*C_p_brain + CLup_brain*f_BBB*V_ES_brain*FR*C_BBB_bound_brain + CLup_brain*(1 - f_BBB)*V_ES_brain*FR*C_BCSFB_bound_brain);
  C_BBB_unbound_brain' = 1/VBBB_brain*(CLup_brain*f_BBB*V_ES_brain*(C_p_brain + C_is_brain) - VBBB_brain*kon_FcRn*C_BBB_unbound_brain*FcRn_free_BBB + VBBB_brain*koff_FcRn*C_BBB_bound_brain - VBBB_brain*kdeg*C_BBB_unbound_brain);
  C_BBB_bound_brain' = 1/VBBB_brain*(-CLup_brain*f_BBB*V_ES_brain*C_BBB_bound_brain + VBBB_brain*kon_FcRn*C_BBB_unbound_brain*FcRn_free_BBB - VBBB_brain*koff_FcRn*C_BBB_bound_brain);
  C_is_brain' = 1/VIS_brain*((1 - sigma_V_BBB)*Q_ISF_brain*C_p_brain - (1 - sigma_L_brain_ISF)*Q_ISF_brain*C_is_brain - Q_ISF_brain*C_is_brain + Q_ISF_brain*C_SAS_brain + CLup_brain*f_BBB*V_ES_brain*(1 - FR)*C_BBB_bound_brain - CLup_brain*f_BBB*V_ES_brain*C_is_brain);
  C_bc_brain' = 1/VBC_brain*(Q_bc_brain*C_bc_lung - Q_bc_brain*C_bc_brain);
  C_BCSFB_unbound_brain' = 1/V_BCSFB_brain*(CLup_brain*f_BCSFB*V_ES_brain*C_p_brain + f_LV*CLup_brain*(1 - f_BBB)*V_ES_brain*C_LV_brain + (1 - f_LV)*CLup_brain*(1 - f_BBB)*V_ES_brain*C_TFV_brain - V_BCSFB_brain*kon_FcRn*C_BCSFB_unbound_brain*FcRn_free_BCSFB + V_BCSFB_brain*koff_FcRn*C_BCSFB_bound_brain - V_BCSFB_brain*kdeg*C_BCSFB_unbound_brain);
  C_BCSFB_bound_brain' = 1/V_BCSFB_brain*(-CLup_brain*(1 - f_BBB)*V_ES_brain*C_BCSFB_bound_brain + V_BCSFB_brain*kon_FcRn*C_BCSFB_unbound_brain*FcRn_free_BCSFB - V_BCSFB_brain*koff_FcRn*C_BCSFB_bound_brain);
  C_LV_brain' = 1/V_LV_brain*((1 - sigma_V_BCSFB)*f_LV*Q_CSF_brain*C_p_brain + f_LV*Q_ISF_brain*C_is_brain - (f_LV*Q_CSF_brain + f_LV*Q_ISF_brain)*C_LV_brain - f_LV*CLup_brain*(1 - f_BBB)*V_ES_brain*C_LV_brain + f_LV*CLup_brain*(1 - f_BBB)*V_ES_brain*(1 - FR)*C_BCSFB_bound_brain);
  C_TFV_brain' = 1/V_TFV_brain*((1 - sigma_V_BCSFB)*(1 - f_LV)*Q_CSF_brain*C_p_brain + (1 - f_LV)*Q_ISF_brain*C_is_brain - (Q_CSF_brain + Q_ISF_brain)*C_TFV_brain - (1 - f_LV)*CLup_brain*(1 - f_BBB)*V_ES_brain*C_TFV_brain + (1 - f_LV)*CLup_brain*(1 - f_BBB)*V_ES_brain*(1 - FR)*C_BCSFB_bound_brain + (f_LV*Q_CSF_brain + f_LV*Q_ISF_brain)*C_LV_brain);
  C_CM_brain' = 1/V_CM_brain*(Q_CSF_brain + Q_ISF_brain)*(C_TFV_brain - C_CM_brain);
  C_SAS_brain' = 1/V_SAS_brain*((Q_CSF_brain + Q_ISF_brain)*C_CM_brain - (1 - sigma_L_SAS)*Q_CSF_brain*C_SAS_brain - Q_ISF_brain*C_SAS_brain);
end
