// SBML level 3 version 2

model PBPK_Model()
  // model units - time: hour

  // Compartments:
  compartment plasma = 3126 millilitre;
  compartment blood_cells = 2558 millilitre;
  compartment lymph_node = 274 millilitre;
  compartment Vp_lung = 1000 millilitre;
  compartment VBC_lung = 55 millilitre;
  compartment VIS_lung = 45 millilitre;
  compartment VES_lung = 5 millilitre;
  compartment Vp_brain = 31.9 millilitre;
  compartment VIS_brain = 261 millilitre;
  compartment VBBB_brain = 0.1 millilitre;
  compartment VBC_brain = 26.1 millilitre;
  compartment V_ES_brain = 7.25 millilitre;
  compartment V_BCSFB_brain = 0.1 millilitre;
  compartment V_LV_brain = 22.5 millilitre;
  compartment V_TFV_brain = 22.5 millilitre;
  compartment V_CM_brain = 7.5 millilitre;
  compartment V_SAS_brain = 90 millilitre;
  compartment Vp_liver = 2143 millilitre;
  compartment VBC_liver = 183 millilitre;
  compartment VIS_liver = 149 millilitre;
  compartment VES_liver = 10.7 millilitre;
  compartment Vp_heart = 341 millilitre;
  compartment VBC_heart = 13.1 millilitre;
  compartment VIS_heart = 10.8 millilitre;
  compartment VES_heart = 1.71 millilitre;
  compartment Vp_muscle = 30078 millilitre;
  compartment VBC_muscle = 662 millilitre;
  compartment VIS_muscle = 541 millilitre;
  compartment VES_muscle = 150 millilitre;
  compartment Vp_kidney = 332 millilitre;
  compartment VBC_kidney = 18.2 millilitre;
  compartment VIS_kidney = 14.9 millilitre;
  compartment VES_kidney = 1.66 millilitre;
  compartment Vp_skin = 3408 millilitre;
  compartment VBC_skin = 127 millilitre;
  compartment VIS_skin = 104 millilitre;
  compartment VES_skin = 17 millilitre;
  compartment Vp_fat = 13465 millilitre;
  compartment VBC_fat = 148 millilitre;
  compartment VIS_fat = 121 millilitre;
  compartment VES_fat = 67.3 millilitre;
  compartment Vp_marrow = 10165 millilitre;
  compartment VBC_marrow = 224 millilitre;
  compartment VIS_marrow = 183 millilitre;
  compartment VES_marrow = 50.8 millilitre;
  compartment Vp_thymus = 6.41 millilitre;
  compartment VBC_thymus = 0.353 millilitre;
  compartment VIS_thymus = 0.288 millilitre;
  compartment VES_thymus = 0.0321 millilitre;
  compartment Vp_SI = 385 millilitre;
  compartment VBC_SI = 6.15 millilitre;
  compartment VIS_SI = 5.03 millilitre;
  compartment VES_SI = 1.93 millilitre;
  compartment Vp_LI = 548 millilitre;
  compartment VBC_LI = 8.74 millilitre;
  compartment VIS_LI = 7.15 millilitre;
  compartment VES_LI = 2.74 millilitre;
  compartment Vp_spleen = 221 millilitre;
  compartment VBC_spleen = 26.8 millilitre;
  compartment VIS_spleen = 21.9 millilitre;
  compartment VES_spleen = 1.11 millilitre;
  compartment Vp_pancreas = 104 millilitre;
  compartment VBC_pancreas = 5.7 millilitre;
  compartment VIS_pancreas = 4.66 millilitre;
  compartment VES_pancreas = 0.518 millilitre;
  compartment Vp_other = 4852 millilitre;
  compartment VBC_other = 204 millilitre;
  compartment VIS_other = 167 millilitre;
  compartment VES_other = 24.3 millilitre;

  // Species:
  species C_p in plasma = 4.516315;  // substance in mole_per_litre
  species C_bc in blood_cells = 0;  // substance in mole_per_litre
  species C_ln in lymph_node = 0;  // substance in mole_per_litre
  species C_p_lung in Vp_lung = 0;  // substance in mole_per_litre
  species C_bc_lung in VBC_lung = 0;  // substance in mole_per_litre
  species C_is_lung in VIS_lung = 0;  // substance in mole_per_litre
  species C_e_unbound_lung in VES_lung = 0;  // substance in mole_per_litre
  species C_e_bound_lung in VES_lung = 0;  // substance in mole_per_litre
  species FcRn_free_lung in VES_lung = 4.982e-5;  // substance in mole_per_litre
  species C_p_brain in Vp_brain = 0;  // substance in mole_per_litre
  species C_BBB_unbound_brain in VBBB_brain = 0;  // substance in mole_per_litre
  species C_BBB_bound_brain in VBBB_brain = 0;  // substance in mole_per_litre
  species C_is_brain in VIS_brain = 0;  // substance in mole_per_litre
  species C_bc_brain in VBC_brain = 0;  // substance in mole_per_litre
  species C_BCSFB_unbound_brain in V_BCSFB_brain = 0;  // substance in mole_per_litre
  species C_BCSFB_bound_brain in V_BCSFB_brain = 0;  // substance in mole_per_litre
  species C_LV_brain in V_LV_brain = 0;  // substance in mole_per_litre
  species C_TFV_brain in V_TFV_brain = 0;  // substance in mole_per_litre
  species C_CM_brain in V_CM_brain = 0;  // substance in mole_per_litre
  species C_SAS_brain in V_SAS_brain = 0;  // substance in mole_per_litre
  species C_p_liver in Vp_liver = 0;  // substance in mole_per_litre
  species C_bc_liver in VBC_liver = 0;  // substance in mole_per_litre
  species C_is_liver in VIS_liver = 0;  // substance in mole_per_litre
  species C_e_unbound_liver in VES_liver = 0;  // substance in mole_per_litre
  species C_e_bound_liver in VES_liver = 0;  // substance in mole_per_litre
  species FcRn_free_liver in VES_liver = 4.982e-5;  // substance in mole_per_litre
  species C_p_heart in Vp_heart = 0;  // substance in mole_per_litre
  species C_bc_heart in VBC_heart = 0;  // substance in mole_per_litre
  species C_is_heart in VIS_heart = 0;  // substance in mole_per_litre
  species C_e_unbound_heart in VES_heart = 0;  // substance in mole_per_litre
  species C_e_bound_heart in VES_heart = 0;  // substance in mole_per_litre
  species FcRn_free_heart in VES_heart = 4.982e-5;  // substance in mole_per_litre
  species C_p_muscle in Vp_muscle = 0;  // substance in mole_per_litre
  species C_bc_muscle in VBC_muscle = 0;  // substance in mole_per_litre
  species C_is_muscle in VIS_muscle = 0;  // substance in mole_per_litre
  species C_e_unbound_muscle in VES_muscle = 0;  // substance in mole_per_litre
  species C_e_bound_muscle in VES_muscle = 0;  // substance in mole_per_litre
  species FcRn_free_muscle in VES_muscle = 4.982e-5;  // substance in mole_per_litre
  species C_p_kidney in Vp_kidney = 0;  // substance in mole_per_litre
  species C_bc_kidney in VBC_kidney = 0;  // substance in mole_per_litre
  species C_is_kidney in VIS_kidney = 0;  // substance in mole_per_litre
  species C_e_unbound_kidney in VES_kidney = 0;  // substance in mole_per_litre
  species C_e_bound_kidney in VES_kidney = 0;  // substance in mole_per_litre
  species FcRn_free_kidney in VES_kidney = 4.982e-5;  // substance in mole_per_litre
  species C_p_skin in Vp_skin = 0;  // substance in mole_per_litre
  species C_bc_skin in VBC_skin = 0;  // substance in mole_per_litre
  species C_is_skin in VIS_skin = 0;  // substance in mole_per_litre
  species C_e_unbound_skin in VES_skin = 0;  // substance in mole_per_litre
  species C_e_bound_skin in VES_skin = 0;  // substance in mole_per_litre
  species FcRn_free_skin in VES_skin = 4.982e-5;  // substance in mole_per_litre
  species C_p_fat in Vp_fat = 0;  // substance in mole_per_litre
  species C_bc_fat in VBC_fat = 0;  // substance in mole_per_litre
  species C_is_fat in VIS_fat = 0;  // substance in mole_per_litre
  species C_e_unbound_fat in VES_fat = 0;  // substance in mole_per_litre
  species C_e_bound_fat in VES_fat = 0;  // substance in mole_per_litre
  species FcRn_free_fat in VES_fat = 4.982e-5;  // substance in mole_per_litre
  species C_p_marrow in Vp_marrow = 0;  // substance in mole_per_litre
  species C_bc_marrow in VBC_marrow = 0;  // substance in mole_per_litre
  species C_is_marrow in VIS_marrow = 0;  // substance in mole_per_litre
  species C_e_unbound_marrow in VES_marrow = 0;  // substance in mole_per_litre
  species C_e_bound_marrow in VES_marrow = 0;  // substance in mole_per_litre
  species FcRn_free_marrow in VES_marrow = 4.982e-5;  // substance in mole_per_litre
  species C_p_thymus in Vp_thymus = 0;  // substance in mole_per_litre
  species C_bc_thymus in VBC_thymus = 0;  // substance in mole_per_litre
  species C_is_thymus in VIS_thymus = 0;  // substance in mole_per_litre
  species C_e_unbound_thymus in VES_thymus = 0;  // substance in mole_per_litre
  species C_e_bound_thymus in VES_thymus = 0;  // substance in mole_per_litre
  species FcRn_free_thymus in VES_thymus = 4.982e-5;  // substance in mole_per_litre
  species C_p_SI in Vp_SI = 0;  // substance in mole_per_litre
  species C_bc_SI in VBC_SI = 0;  // substance in mole_per_litre
  species C_is_SI in VIS_SI = 0;  // substance in mole_per_litre
  species C_e_unbound_SI in VES_SI = 0;  // substance in mole_per_litre
  species C_e_bound_SI in VES_SI = 0;  // substance in mole_per_litre
  species FcRn_free_SI in VES_SI = 4.982e-5;  // substance in mole_per_litre
  species C_p_LI in Vp_LI = 0;  // substance in mole_per_litre
  species C_bc_LI in VBC_LI = 0;  // substance in mole_per_litre
  species C_is_LI in VIS_LI = 0;  // substance in mole_per_litre
  species C_e_unbound_LI in VES_LI = 0;  // substance in mole_per_litre
  species C_e_bound_LI in VES_LI = 0;  // substance in mole_per_litre
  species FcRn_free_LI in VES_LI = 4.982e-5;  // substance in mole_per_litre
  species C_p_spleen in Vp_spleen = 0;  // substance in mole_per_litre
  species C_bc_spleen in VBC_spleen = 0;  // substance in mole_per_litre
  species C_is_spleen in VIS_spleen = 0;  // substance in mole_per_litre
  species C_e_unbound_spleen in VES_spleen = 0;  // substance in mole_per_litre
  species C_e_bound_spleen in VES_spleen = 0;  // substance in mole_per_litre
  species FcRn_free_spleen in VES_spleen = 4.982e-5;  // substance in mole_per_litre
  species C_p_pancreas in Vp_pancreas = 0;  // substance in mole_per_litre
  species C_bc_pancreas in VBC_pancreas = 0;  // substance in mole_per_litre
  species C_is_pancreas in VIS_pancreas = 0;  // substance in mole_per_litre
  species C_e_unbound_pancreas in VES_pancreas = 0;  // substance in mole_per_litre
  species C_e_bound_pancreas in VES_pancreas = 0;  // substance in mole_per_litre
  species FcRn_free_pancreas in VES_pancreas = 4.982e-5;  // substance in mole_per_litre
  species C_p_other in Vp_other = 0;  // substance in mole_per_litre
  species C_bc_other in VBC_other = 0;  // substance in mole_per_litre
  species C_is_other in VIS_other = 0;  // substance in mole_per_litre
  species C_e_unbound_other in VES_other = 0;  // substance in mole_per_litre
  species C_e_bound_other in VES_other = 0;  // substance in mole_per_litre
  species FcRn_free_other in VES_other = 4.982e-5;  // substance in mole_per_litre

  // Parameters:
  Vp = 3126 mL;
  Vbc = 2558 mL;
  Vlymphnode = 274 mL;
  Vp_lung = 1000 mL;
  VBC_lung = 55 mL;
  VIS_lung = 45 mL;
  VES_lung = 5 mL;
  Q_p_lung = 181913;
  Q_bc_lung = 148920;
  L_lung = 364;
  sigma_V_lung = 0.95 dimensionless;
  sigma_L_lung = 0.2 dimensionless;
  CLup_lung = 0.55;
  Vp_brain = 31.9 mL;
  VIS_brain = 261 mL;
  VBBB_brain = 0.1 mL;
  VBC_brain = 26.1 mL;
  V_ES_brain = 7.25 mL;
  V_BCSFB_brain = 0.1 mL;
  V_LV_brain = 22.5 mL;
  V_TFV_brain = 22.5 mL;
  V_CM_brain = 7.5 mL;
  V_SAS_brain = 90 mL;
  Q_p_brain = 36402;
  Q_bc_brain = 29810;
  L_brain = 73;
  sigma_V_brain = 0.95 dimensionless;
  sigma_L_brain = 0.2 dimensionless;
  sigma_L_SAS = 0.2 dimensionless;
  sigma_L_brain_ISF = 0.2 dimensionless;
  CLup_brain = 0.3;
  Q_CSF_brain = 21;
  Q_ISF_brain = 10.5;
  Q_ECF_brain = 10.5;
  sigma_V_BBB = 0.95 dimensionless;
  sigma_V_BCSFB = 0.9974 dimensionless;
  Vp_liver = 2143 mL;
  VBC_liver = 183 mL;
  VIS_liver = 149 mL;
  VES_liver = 10.7 mL;
  Q_p_liver = 13210;
  Q_bc_liver = 10820;
  L_liver = 26;
  sigma_V_liver = 0.95 dimensionless;
  sigma_L_liver = 0.2 dimensionless;
  CLup_liver = 0.55;
  L_lung = 364;
  L_brain = 73;
  L_heart = 16;
  L_liver = 26;
  L_kidney = 65;
  L_muscle = 67;
  L_skin = 23;
  L_fat = 17;
  L_marrow = 5;
  L_thymus = 1;
  L_SI = 25;
  L_LI = 26;
  L_spleen = 13;
  L_pancreas = 6;
  L_other = 11;
  L_LN = 500;
  kon_FcRn = 559000000;
  koff_FcRn = 23.9;
  kdeg = 26.6;
  FR = 0.715 dimensionless;
  f_BBB = 0.95 dimensionless;
  f_LV = 0.2 dimensionless;
  f_BCSFB = 0.2 dimensionless;
  FcRn_free_BBB = 1 dimensionless;
  FcRn_free_BCSFB = 1 dimensionless;
  Vp_heart = 341 mL;
  VBC_heart = 13.1 mL;
  VIS_heart = 10.8 mL;
  VES_heart = 1.71 mL;
  Q_p_heart = 7752;
  Q_bc_heart = 6350;
  L_heart = 16;
  sigma_V_heart = 0.95 dimensionless;
  sigma_L_heart = 0.2 dimensionless;
  CLup_heart = 0.55;
  Vp_muscle = 30078 mL;
  VBC_muscle = 662 mL;
  VIS_muscle = 541 mL;
  VES_muscle = 150 mL;
  Q_p_muscle = 33469;
  Q_bc_muscle = 27410;
  L_muscle = 67;
  sigma_V_muscle = 0.95 dimensionless;
  sigma_L_muscle = 0.2 dimensionless;
  CLup_muscle = 0.55;
  Vp_kidney = 332 mL;
  VBC_kidney = 18.2 mL;
  VIS_kidney = 14.9 mL;
  VES_kidney = 1.66 mL;
  Q_p_kidney = 32402;
  Q_bc_kidney = 26530;
  L_kidney = 65;
  sigma_V_kidney = 0.9 dimensionless;
  sigma_L_kidney = 0.2 dimensionless;
  CLup_kidney = 0.55;
  Vp_skin = 3408 mL;
  VBC_skin = 127 mL;
  VIS_skin = 104 mL;
  VES_skin = 17 mL;
  Q_p_skin = 11626;
  Q_bc_skin = 9520;
  L_skin = 23;
  sigma_V_skin = 0.95 dimensionless;
  sigma_L_skin = 0.2 dimensionless;
  CLup_skin = 0.55;
  Vp_fat = 13465 mL;
  VBC_fat = 148 mL;
  VIS_fat = 121 mL;
  VES_fat = 67.3 mL;
  Q_p_fat = 8343;
  Q_bc_fat = 6830;
  L_fat = 17;
  sigma_V_fat = 0.95 dimensionless;
  sigma_L_fat = 0.2 dimensionless;
  CLup_fat = 0.55;
  Vp_marrow = 10165 mL;
  VBC_marrow = 224 mL;
  VIS_marrow = 183 mL;
  VES_marrow = 50.8 mL;
  Q_p_marrow = 2591;
  Q_bc_marrow = 2120;
  L_marrow = 5;
  sigma_V_marrow = 0.95 dimensionless;
  sigma_L_marrow = 0.2 dimensionless;
  CLup_marrow = 0.55;
  Vp_thymus = 6.41 mL;
  VBC_thymus = 0.353 mL;
  VIS_thymus = 0.288 mL;
  VES_thymus = 0.0321 mL;
  Q_p_thymus = 353;
  Q_bc_thymus = 289;
  L_thymus = 1;
  sigma_V_thymus = 0.9 dimensionless;
  sigma_L_thymus = 0.2 dimensionless;
  CLup_thymus = 0.55;
  Vp_SI = 385 mL;
  VBC_SI = 6.15 mL;
  VIS_SI = 5.03 mL;
  VES_SI = 1.93 mL;
  Q_p_SI = 12368;
  Q_bc_SI = 10130;
  L_SI = 25;
  sigma_V_SI = 0.9 dimensionless;
  sigma_L_SI = 0.2 dimensionless;
  CLup_SI = 0.55;
  Vp_LI = 548 mL;
  VBC_LI = 8.74 mL;
  VIS_LI = 7.15 mL;
  VES_LI = 2.74 mL;
  Q_p_LI = 12867;
  Q_bc_LI = 10530;
  L_LI = 26;
  sigma_V_LI = 0.95 dimensionless;
  sigma_L_LI = 0.2 dimensionless;
  CLup_LI = 0.55;
  Vp_spleen = 221 mL;
  VBC_spleen = 26.8 mL;
  VIS_spleen = 21.9 mL;
  VES_spleen = 1.11 mL;
  Q_p_spleen = 6343;
  Q_bc_spleen = 5190;
  L_spleen = 13;
  sigma_V_spleen = 0.85 dimensionless;
  sigma_L_spleen = 0.2 dimensionless;
  CLup_spleen = 0.55;
  Vp_pancreas = 104 mL;
  VBC_pancreas = 5.7 mL;
  VIS_pancreas = 4.66 mL;
  VES_pancreas = 0.518 mL;
  Q_p_pancreas = 3056;
  Q_bc_pancreas = 2500;
  L_pancreas = 6;
  sigma_V_pancreas = 0.9 dimensionless;
  sigma_L_pancreas = 0.2 dimensionless;
  CLup_pancreas = 0.55;
  Vp_other = 4852 mL;
  VBC_other = 204 mL;
  VIS_other = 167 mL;
  VES_other = 24.3 mL;
  Q_p_other = 5521;
  Q_bc_other = 4520;
  L_other = 11;
  sigma_V_other = 0.95 dimensionless;
  sigma_L_other = 0.2 dimensionless;
  CLup_other = 0.55;

  // Rate rules:
  C_p' = 1/Vp*(-(Q_p_lung + L_lung)*C_p + (Q_p_heart - L_heart)*C_p_heart + (Q_p_kidney - L_kidney)*C_p_kidney + (Q_p_brain - L_brain)*C_p_brain + (Q_p_muscle - L_muscle)*C_p_muscle + (Q_p_marrow - L_marrow)*C_p_marrow + (Q_p_thymus - L_thymus)*C_p_thymus + (Q_p_skin - L_skin)*C_p_skin + (Q_p_fat - L_fat)*C_p_fat + (Q_p_SI - L_SI + (Q_p_LI - L_LI) + (Q_p_spleen - L_spleen) + (Q_p_pancreas - L_pancreas) + (Q_p_liver - L_liver))*C_p_liver + (Q_p_other - L_other)*C_p_other + L_LN*C_ln);
  C_bc' = 1/Vbc*(-Q_bc_lung*C_bc + Q_bc_heart*C_bc_heart + Q_bc_kidney*C_bc_kidney + Q_bc_brain*C_bc_brain + Q_bc_muscle*C_bc_muscle + Q_bc_marrow*C_bc_marrow + Q_bc_thymus*C_bc_thymus + Q_bc_skin*C_bc_skin + Q_bc_fat*C_bc_fat + (Q_bc_SI + Q_bc_LI + Q_bc_spleen + Q_bc_pancreas + Q_bc_liver)*C_bc_liver + Q_bc_other*C_bc_other);
  C_ln' = 1/Vlymphnode*((1 - sigma_L_lung)*L_lung*C_is_lung + (1 - sigma_L_heart)*L_heart*C_is_heart + (1 - sigma_L_kidney)*L_kidney*C_is_kidney + (1 - sigma_L_SAS)*Q_CSF_brain*C_SAS_brain + (1 - sigma_L_brain_ISF)*Q_ECF_brain*C_is_brain + (1 - sigma_L_muscle)*L_muscle*C_is_muscle + (1 - sigma_L_marrow)*L_marrow*C_is_marrow + (1 - sigma_L_thymus)*L_thymus*C_is_thymus + (1 - sigma_L_skin)*L_skin*C_is_skin + (1 - sigma_L_fat)*L_fat*C_is_fat + (1 - sigma_L_SI)*L_SI*C_is_SI + (1 - sigma_L_LI)*L_LI*C_is_LI + (1 - sigma_L_spleen)*L_spleen*C_is_spleen + (1 - sigma_L_pancreas)*L_pancreas*C_is_pancreas + (1 - sigma_L_liver)*L_liver*C_is_liver + (1 - sigma_L_other)*L_other*C_is_other - L_LN*C_ln);
  C_p_lung' = 1/Vp_lung*(Q_p_lung*C_p - Q_p_lung*C_p_lung - (1 - sigma_V_lung)*L_lung*C_p_lung - CLup_lung*C_p_lung + CLup_lung*FR*C_e_bound_lung);
  C_bc_lung' = 1/VBC_lung*(Q_bc_lung*C_bc - Q_bc_lung*C_bc_lung);
  C_e_unbound_lung' = 1/VES_lung*(CLup_lung*(C_p_lung + C_is_lung) - VES_lung*kon_FcRn*C_e_unbound_lung*FcRn_free_lung + VES_lung*koff_FcRn*C_e_bound_lung - kdeg*C_e_unbound_lung*VES_lung);
  C_e_bound_lung' = 1/VES_lung*(VES_lung*kon_FcRn*C_e_unbound_lung*FcRn_free_lung - VES_lung*koff_FcRn*C_e_bound_lung - CLup_lung*C_e_bound_lung);
  C_is_lung' = 1/VIS_lung*((1 - sigma_V_lung)*L_lung*C_p_lung - (1 - sigma_L_lung)*L_lung*C_is_lung + CLup_lung*(1 - FR)*C_e_bound_lung - CLup_lung*C_is_lung);
  FcRn_free_lung' = 1/VES_lung*(koff_FcRn*C_e_bound_lung*VES_lung - kon_FcRn*C_e_unbound_lung*FcRn_free_lung*VES_lung + CLup_lung*C_e_bound_lung);
  C_p_brain' = 1/Vp_brain*(Q_p_brain*C_p_lung - (Q_p_brain - L_brain)*C_p_brain - (1 - sigma_V_BBB)*Q_ISF_brain*C_p_brain - (1 - sigma_V_BCSFB)*Q_CSF_brain*C_p_brain - CLup_brain*V_ES_brain*C_p_brain + CLup_brain*f_BBB*V_ES_brain*FR*C_BBB_bound_brain + CLup_brain*(1 - f_BBB)*V_ES_brain*FR*C_BCSFB_bound_brain);
  C_BBB_unbound_brain' = 1/VBBB_brain*(CLup_brain*f_BBB*V_ES_brain*(C_p_brain + C_is_brain) - VBBB_brain*kon_FcRn*C_BBB_unbound_brain*FcRn_free_BBB + VBBB_brain*koff_FcRn*C_BBB_bound_brain - VBBB_brain*kdeg*C_BBB_unbound_brain);
  C_BBB_bound_brain' = 1/VBBB_brain*(-CLup_brain*f_BBB*V_ES_brain*C_BBB_bound_brain + VBBB_brain*kon_FcRn*C_BBB_unbound_brain*FcRn_free_BBB - VBBB_brain*koff_FcRn*C_BBB_bound_brain);
  C_is_brain' = 1/VIS_brain*((1 - sigma_V_BBB)*Q_ISF_brain*C_p_brain - (1 - sigma_L_brain_ISF)*Q_ISF_brain*C_is_brain - Q_ISF_brain*C_is_brain + Q_ISF_brain*C_SAS_brain + CLup_brain*f_BBB*V_ES_brain*(1 - FR)*C_BBB_bound_brain - CLup_brain*f_BBB*V_ES_brain*C_is_brain);
  C_BCSFB_unbound_brain' = 1/V_BCSFB_brain*(CLup_brain*f_BCSFB*V_ES_brain*C_p_brain + f_LV*CLup_brain*(1 - f_BBB)*V_ES_brain*C_LV_brain + (1 - f_LV)*CLup_brain*(1 - f_BBB)*V_ES_brain*C_TFV_brain - V_BCSFB_brain*kon_FcRn*C_BCSFB_unbound_brain*FcRn_free_BCSFB + V_BCSFB_brain*koff_FcRn*C_BCSFB_bound_brain - V_BCSFB_brain*kdeg*C_BCSFB_unbound_brain);
  C_BCSFB_bound_brain' = 1/V_BCSFB_brain*(-CLup_brain*(1 - f_BBB)*V_ES_brain*C_BCSFB_bound_brain + V_BCSFB_brain*kon_FcRn*C_BCSFB_unbound_brain*FcRn_free_BCSFB - V_BCSFB_brain*koff_FcRn*C_BCSFB_bound_brain);
  C_LV_brain' = 1/V_LV_brain*((1 - sigma_V_BCSFB)*f_LV*Q_CSF_brain*C_p_brain + f_LV*Q_ISF_brain*C_is_brain - (f_LV*Q_CSF_brain + f_LV*Q_ISF_brain)*C_LV_brain - f_LV*CLup_brain*(1 - f_BBB)*V_ES_brain*C_LV_brain + f_LV*CLup_brain*(1 - f_BBB)*V_ES_brain*(1 - FR)*C_BCSFB_bound_brain);
  C_TFV_brain' = 1/V_TFV_brain*((1 - sigma_V_BCSFB)*(1 - f_LV)*Q_CSF_brain*C_p_brain + (1 - f_LV)*Q_ISF_brain*C_is_brain - (Q_CSF_brain + Q_ISF_brain)*C_TFV_brain - (1 - f_LV)*CLup_brain*(1 - f_BBB)*V_ES_brain*C_TFV_brain + (1 - f_LV)*CLup_brain*(1 - f_BBB)*V_ES_brain*(1 - FR)*C_BCSFB_bound_brain + (f_LV*Q_CSF_brain + f_LV*Q_ISF_brain)*C_LV_brain);
  C_CM_brain' = 1/V_CM_brain*(Q_CSF_brain + Q_ISF_brain)*(C_TFV_brain - C_CM_brain);
  C_SAS_brain' = 1/V_SAS_brain*((Q_CSF_brain + Q_ISF_brain)*C_CM_brain - (1 - sigma_L_SAS)*Q_CSF_brain*C_SAS_brain - Q_ISF_brain*C_SAS_brain);
  C_p_liver' = 1/Vp_liver*(Q_p_liver*C_p_lung + Q_p_spleen*C_p_spleen + Q_p_pancreas*C_p_pancreas + Q_p_SI*C_p_SI + Q_p_LI*C_p_LI - (Q_p_liver - L_liver + (Q_p_spleen - L_spleen) + (Q_p_pancreas - L_pancreas) + (Q_p_SI - L_SI) + (Q_p_LI - L_LI))*C_p_liver - (1 - sigma_V_liver)*L_liver*C_p_liver - CLup_liver*C_p_liver + CLup_liver*FR*C_e_bound_liver);
  C_bc_liver' = 1/VBC_liver*(Q_bc_liver*C_bc_lung + Q_bc_spleen*C_bc_spleen + Q_bc_pancreas*C_bc_pancreas + Q_bc_SI*C_bc_SI + Q_bc_LI*C_bc_LI - (Q_bc_liver + Q_bc_spleen + Q_bc_pancreas + Q_bc_SI + Q_bc_LI)*C_bc_liver);
  C_is_liver' = 1/VIS_liver*((1 - sigma_V_liver)*L_liver*C_p_liver - (1 - sigma_L_liver)*L_liver*C_is_liver + CLup_liver*(1 - FR)*C_e_bound_liver - CLup_liver*C_is_liver);
  C_e_unbound_liver' = 1/VES_liver*(CLup_liver*(C_p_liver + C_is_liver) - VES_liver*kon_FcRn*C_e_unbound_liver*FcRn_free_liver + VES_liver*koff_FcRn*C_e_bound_liver - kdeg*C_e_unbound_liver*VES_liver);
  C_e_bound_liver' = 1/VES_liver*(VES_liver*kon_FcRn*C_e_unbound_liver*FcRn_free_liver - VES_liver*koff_FcRn*C_e_bound_liver - CLup_liver*C_e_bound_liver);
  FcRn_free_liver' = 1/VES_liver*(koff_FcRn*C_e_bound_liver*VES_liver - kon_FcRn*C_e_unbound_liver*FcRn_free_liver*VES_liver + CLup_liver*C_e_bound_liver);
  C_p_heart' = 1/Vp_heart*(Q_p_heart*C_p_lung - Q_p_heart*C_p_heart - (1 - sigma_V_heart)*L_heart*C_p_heart - CLup_heart*C_p_heart + CLup_heart*FR*C_e_bound_heart);
  C_bc_heart' = 1/VBC_heart*(Q_bc_heart*C_bc_lung - Q_bc_heart*C_bc_heart);
  C_e_unbound_heart' = 1/VES_heart*(CLup_heart*(C_p_heart + C_is_heart) - VES_heart*kon_FcRn*C_e_unbound_heart*FcRn_free_heart + VES_heart*koff_FcRn*C_e_bound_heart - kdeg*C_e_unbound_heart*VES_heart);
  C_e_bound_heart' = 1/VES_heart*(VES_heart*kon_FcRn*C_e_unbound_heart*FcRn_free_heart - VES_heart*koff_FcRn*C_e_bound_heart - CLup_heart*C_e_bound_heart);
  C_is_heart' = 1/VIS_heart*((1 - sigma_V_heart)*L_heart*C_p_heart - (1 - sigma_L_heart)*L_heart*C_is_heart + CLup_heart*(1 - FR)*C_e_bound_heart - CLup_heart*C_is_heart);
  FcRn_free_heart' = 1/VES_heart*(koff_FcRn*C_e_bound_heart*VES_heart - kon_FcRn*C_e_unbound_heart*FcRn_free_heart*VES_heart + CLup_heart*C_e_bound_heart);
  C_p_muscle' = 1/Vp_muscle*(Q_p_muscle*C_p_lung - Q_p_muscle*C_p_muscle - (1 - sigma_V_muscle)*L_muscle*C_p_muscle - CLup_muscle*C_p_muscle + CLup_muscle*FR*C_e_bound_muscle);
  C_bc_muscle' = 1/VBC_muscle*(Q_bc_muscle*C_bc_lung - Q_bc_muscle*C_bc_muscle);
  C_is_muscle' = 1/VIS_muscle*((1 - sigma_V_muscle)*L_muscle*C_p_muscle - (1 - sigma_L_muscle)*L_muscle*C_is_muscle + CLup_muscle*(1 - FR)*C_e_bound_muscle - CLup_muscle*C_is_muscle);
  C_e_unbound_muscle' = 1/VES_muscle*(CLup_muscle*(C_p_muscle + C_is_muscle) - VES_muscle*kon_FcRn*C_e_unbound_muscle*FcRn_free_muscle + VES_muscle*koff_FcRn*C_e_bound_muscle - kdeg*C_e_unbound_muscle*VES_muscle);
  C_e_bound_muscle' = 1/VES_muscle*(VES_muscle*kon_FcRn*C_e_unbound_muscle*FcRn_free_muscle - VES_muscle*koff_FcRn*C_e_bound_muscle - CLup_muscle*C_e_bound_muscle);
  FcRn_free_muscle' = 1/VES_muscle*(koff_FcRn*C_e_bound_muscle*VES_muscle - kon_FcRn*C_e_unbound_muscle*FcRn_free_muscle*VES_muscle + CLup_muscle*C_e_bound_muscle);
  C_p_heart' = 1/Vp_heart*(Q_p_heart*C_p_lung - Q_p_heart*C_p_heart - (1 - sigma_V_heart)*L_heart*C_p_heart - CLup_heart*C_p_heart + CLup_heart*FR*C_e_bound_heart);
  C_bc_heart' = 1/VBC_heart*(Q_bc_heart*C_bc_lung - Q_bc_heart*C_bc_heart);
  C_is_heart' = 1/VIS_heart*((1 - sigma_V_heart)*L_heart*C_p_heart - (1 - sigma_L_heart)*L_heart*C_is_heart + CLup_heart*(1 - FR)*C_e_bound_heart - CLup_heart*C_is_heart);
  C_e_unbound_heart' = 1/VES_heart*(CLup_heart*(C_p_heart + C_is_heart) - VES_heart*kon_FcRn*C_e_unbound_heart*FcRn_free_heart + VES_heart*koff_FcRn*C_e_bound_heart - kdeg*C_e_unbound_heart*VES_heart);
  C_e_bound_heart' = 1/VES_heart*(VES_heart*kon_FcRn*C_e_unbound_heart*FcRn_free_heart - VES_heart*koff_FcRn*C_e_bound_heart - CLup_heart*C_e_bound_heart);
  FcRn_free_heart' = 1/VES_heart*(koff_FcRn*C_e_bound_heart*VES_heart - kon_FcRn*C_e_unbound_heart*FcRn_free_heart*VES_heart + CLup_heart*C_e_bound_heart);
  C_p_muscle' = 1/Vp_muscle*(Q_p_muscle*C_p_lung - Q_p_muscle*C_p_muscle - (1 - sigma_V_muscle)*L_muscle*C_p_muscle - CLup_muscle*C_p_muscle + CLup_muscle*FR*C_e_bound_muscle);
  C_bc_muscle' = 1/VBC_muscle*(Q_bc_muscle*C_bc_lung - Q_bc_muscle*C_bc_muscle);
  C_is_muscle' = 1/VIS_muscle*((1 - sigma_V_muscle)*L_muscle*C_p_muscle - (1 - sigma_L_muscle)*L_muscle*C_is_muscle + CLup_muscle*(1 - FR)*C_e_bound_muscle - CLup_muscle*C_is_muscle);
  C_e_unbound_muscle' = 1/VES_muscle*(CLup_muscle*(C_p_muscle + C_is_muscle) - VES_muscle*kon_FcRn*C_e_unbound_muscle*FcRn_free_muscle + VES_muscle*koff_FcRn*C_e_bound_muscle - kdeg*C_e_unbound_muscle*VES_muscle);
  C_e_bound_muscle' = 1/VES_muscle*(VES_muscle*kon_FcRn*C_e_unbound_muscle*FcRn_free_muscle - VES_muscle*koff_FcRn*C_e_bound_muscle - CLup_muscle*C_e_bound_muscle);
  FcRn_free_muscle' = 1/VES_muscle*(koff_FcRn*C_e_bound_muscle*VES_muscle - kon_FcRn*C_e_unbound_muscle*FcRn_free_muscle*VES_muscle + CLup_muscle*C_e_bound_muscle);
  C_p_kidney' = 1/Vp_kidney*(Q_p_kidney*C_p_lung - Q_p_kidney*C_p_kidney - (1 - sigma_V_kidney)*L_kidney*C_p_kidney - CLup_kidney*C_p_kidney + CLup_kidney*FR*C_e_bound_kidney);
  C_bc_kidney' = 1/VBC_kidney*(Q_bc_kidney*C_bc_lung - Q_bc_kidney*C_bc_kidney);
  C_is_kidney' = 1/VIS_kidney*((1 - sigma_V_kidney)*L_kidney*C_p_kidney - (1 - sigma_L_kidney)*L_kidney*C_is_kidney + CLup_kidney*(1 - FR)*C_e_bound_kidney - CLup_kidney*C_is_kidney);
  C_e_unbound_kidney' = 1/VES_kidney*(CLup_kidney*(C_p_kidney + C_is_kidney) - VES_kidney*kon_FcRn*C_e_unbound_kidney*FcRn_free_kidney + VES_kidney*koff_FcRn*C_e_bound_kidney - kdeg*C_e_unbound_kidney*VES_kidney);
  C_e_bound_kidney' = 1/VES_kidney*(VES_kidney*kon_FcRn*C_e_unbound_kidney*FcRn_free_kidney - VES_kidney*koff_FcRn*C_e_bound_kidney - CLup_kidney*C_e_bound_kidney);
  FcRn_free_kidney' = 1/VES_kidney*(koff_FcRn*C_e_bound_kidney*VES_kidney - kon_FcRn*C_e_unbound_kidney*FcRn_free_kidney*VES_kidney + CLup_kidney*C_e_bound_kidney);
  C_p_skin' = 1/Vp_skin*(Q_p_skin*C_p_lung - Q_p_skin*C_p_skin - (1 - sigma_V_skin)*L_skin*C_p_skin - CLup_skin*C_p_skin + CLup_skin*FR*C_e_bound_skin);
  C_bc_skin' = 1/VBC_skin*(Q_bc_skin*C_bc_lung - Q_bc_skin*C_bc_skin);
  C_is_skin' = 1/VIS_skin*((1 - sigma_V_skin)*L_skin*C_p_skin - (1 - sigma_L_skin)*L_skin*C_is_skin + CLup_skin*(1 - FR)*C_e_bound_skin - CLup_skin*C_is_skin);
  C_e_unbound_skin' = 1/VES_skin*(CLup_skin*(C_p_skin + C_is_skin) - VES_skin*kon_FcRn*C_e_unbound_skin*FcRn_free_skin + VES_skin*koff_FcRn*C_e_bound_skin - kdeg*C_e_unbound_skin*VES_skin);
  C_e_bound_skin' = 1/VES_skin*(VES_skin*kon_FcRn*C_e_unbound_skin*FcRn_free_skin - VES_skin*koff_FcRn*C_e_bound_skin - CLup_skin*C_e_bound_skin);
  FcRn_free_skin' = 1/VES_skin*(koff_FcRn*C_e_bound_skin*VES_skin - kon_FcRn*C_e_unbound_skin*FcRn_free_skin*VES_skin + CLup_skin*C_e_bound_skin);
  C_p_fat' = 1/Vp_fat*(Q_p_fat*C_p_lung - Q_p_fat*C_p_fat - (1 - sigma_V_fat)*L_fat*C_p_fat - CLup_fat*C_p_fat + CLup_fat*FR*C_e_bound_fat);
  C_bc_fat' = 1/VBC_fat*(Q_bc_fat*C_bc_lung - Q_bc_fat*C_bc_fat);
  C_is_fat' = 1/VIS_fat*((1 - sigma_V_fat)*L_fat*C_p_fat - (1 - sigma_L_fat)*L_fat*C_is_fat + CLup_fat*(1 - FR)*C_e_bound_fat - CLup_fat*C_is_fat);
  C_e_unbound_fat' = 1/VES_fat*(CLup_fat*(C_p_fat + C_is_fat) - VES_fat*kon_FcRn*C_e_unbound_fat*FcRn_free_fat + VES_fat*koff_FcRn*C_e_bound_fat - kdeg*C_e_unbound_fat*VES_fat);
  C_e_bound_fat' = 1/VES_fat*(VES_fat*kon_FcRn*C_e_unbound_fat*FcRn_free_fat - VES_fat*koff_FcRn*C_e_bound_fat - CLup_fat*C_e_bound_fat);
  FcRn_free_fat' = 1/VES_fat*(koff_FcRn*C_e_bound_fat*VES_fat - kon_FcRn*C_e_unbound_fat*FcRn_free_fat*VES_fat + CLup_fat*C_e_bound_fat);
  C_p_marrow' = 1/Vp_marrow*(Q_p_marrow*C_p_lung - Q_p_marrow*C_p_marrow - (1 - sigma_V_marrow)*L_marrow*C_p_marrow - CLup_marrow*C_p_marrow + CLup_marrow*FR*C_e_bound_marrow);
  C_bc_marrow' = 1/VBC_marrow*(Q_bc_marrow*C_bc_lung - Q_bc_marrow*C_bc_marrow);
  C_is_marrow' = 1/VIS_marrow*((1 - sigma_V_marrow)*L_marrow*C_p_marrow - (1 - sigma_L_marrow)*L_marrow*C_is_marrow + CLup_marrow*(1 - FR)*C_e_bound_marrow - CLup_marrow*C_is_marrow);
  C_e_unbound_marrow' = 1/VES_marrow*(CLup_marrow*(C_p_marrow + C_is_marrow) - VES_marrow*kon_FcRn*C_e_unbound_marrow*FcRn_free_marrow + VES_marrow*koff_FcRn*C_e_bound_marrow - kdeg*C_e_unbound_marrow*VES_marrow);
  C_e_bound_marrow' = 1/VES_marrow*(VES_marrow*kon_FcRn*C_e_unbound_marrow*FcRn_free_marrow - VES_marrow*koff_FcRn*C_e_bound_marrow - CLup_marrow*C_e_bound_marrow);
  FcRn_free_marrow' = 1/VES_marrow*(koff_FcRn*C_e_bound_marrow*VES_marrow - kon_FcRn*C_e_unbound_marrow*FcRn_free_marrow*VES_marrow + CLup_marrow*C_e_bound_marrow);
  C_p_thymus' = 1/Vp_thymus*(Q_p_thymus*C_p_lung - Q_p_thymus*C_p_thymus - (1 - sigma_V_thymus)*L_thymus*C_p_thymus - CLup_thymus*C_p_thymus + CLup_thymus*FR*C_e_bound_thymus);
  C_bc_thymus' = 1/VBC_thymus*(Q_bc_thymus*C_bc_lung - Q_bc_thymus*C_bc_thymus);
  C_is_thymus' = 1/VIS_thymus*((1 - sigma_V_thymus)*L_thymus*C_p_thymus - (1 - sigma_L_thymus)*L_thymus*C_is_thymus + CLup_thymus*(1 - FR)*C_e_bound_thymus - CLup_thymus*C_is_thymus);
  C_e_unbound_thymus' = 1/VES_thymus*(CLup_thymus*(C_p_thymus + C_is_thymus) - VES_thymus*kon_FcRn*C_e_unbound_thymus*FcRn_free_thymus + VES_thymus*koff_FcRn*C_e_bound_thymus - kdeg*C_e_unbound_thymus*VES_thymus);
  C_e_bound_thymus' = 1/VES_thymus*(VES_thymus*kon_FcRn*C_e_unbound_thymus*FcRn_free_thymus - VES_thymus*koff_FcRn*C_e_bound_thymus - CLup_thymus*C_e_bound_thymus);
  FcRn_free_thymus' = 1/VES_thymus*(koff_FcRn*C_e_bound_thymus*VES_thymus - kon_FcRn*C_e_unbound_thymus*FcRn_free_thymus*VES_thymus + CLup_thymus*C_e_bound_thymus);
  C_p_SI' = 1/Vp_SI*(Q_p_SI*C_p_lung - Q_p_SI*C_p_SI - (1 - sigma_V_SI)*L_SI*C_p_SI - CLup_SI*C_p_SI + CLup_SI*FR*C_e_bound_SI);
  C_bc_SI' = 1/VBC_SI*(Q_bc_SI*C_bc_lung - Q_bc_SI*C_bc_SI);
  C_is_SI' = 1/VIS_SI*((1 - sigma_V_SI)*L_SI*C_p_SI - (1 - sigma_L_SI)*L_SI*C_is_SI + CLup_SI*(1 - FR)*C_e_bound_SI - CLup_SI*C_is_SI);
  C_e_unbound_SI' = 1/VES_SI*(CLup_SI*(C_p_SI + C_is_SI) - VES_SI*kon_FcRn*C_e_unbound_SI*FcRn_free_SI + VES_SI*koff_FcRn*C_e_bound_SI - kdeg*C_e_unbound_SI*VES_SI);
  C_e_bound_SI' = 1/VES_SI*(VES_SI*kon_FcRn*C_e_unbound_SI*FcRn_free_SI - VES_SI*koff_FcRn*C_e_bound_SI - CLup_SI*C_e_bound_SI);
  FcRn_free_SI' = 1/VES_SI*(koff_FcRn*C_e_bound_SI*VES_SI - kon_FcRn*C_e_unbound_SI*FcRn_free_SI*VES_SI + CLup_SI*C_e_bound_SI);
  C_p_LI' = 1/Vp_LI*(Q_p_LI*C_p_lung - Q_p_LI*C_p_LI - (1 - sigma_V_LI)*L_LI*C_p_LI - CLup_LI*C_p_LI + CLup_LI*FR*C_e_bound_LI);
  C_bc_LI' = 1/VBC_LI*(Q_bc_LI*C_bc_lung - Q_bc_LI*C_bc_LI);
  C_is_LI' = 1/VIS_LI*((1 - sigma_V_LI)*L_LI*C_p_LI - (1 - sigma_L_LI)*L_LI*C_is_LI + CLup_LI*(1 - FR)*C_e_bound_LI - CLup_LI*C_is_LI);
  C_e_unbound_LI' = 1/VES_LI*(CLup_LI*(C_p_LI + C_is_LI) - VES_LI*kon_FcRn*C_e_unbound_LI*FcRn_free_LI + VES_LI*koff_FcRn*C_e_bound_LI - kdeg*C_e_unbound_LI*VES_LI);
  C_e_bound_LI' = 1/VES_LI*(VES_LI*kon_FcRn*C_e_unbound_LI*FcRn_free_LI - VES_LI*koff_FcRn*C_e_bound_LI - CLup_LI*C_e_bound_LI);
  FcRn_free_LI' = 1/VES_LI*(koff_FcRn*C_e_bound_LI*VES_LI - kon_FcRn*C_e_unbound_LI*FcRn_free_LI*VES_LI + CLup_LI*C_e_bound_LI);
  C_p_spleen' = 1/Vp_spleen*(Q_p_spleen*C_p_lung - Q_p_spleen*C_p_spleen - (1 - sigma_V_spleen)*L_spleen*C_p_spleen - CLup_spleen*C_p_spleen + CLup_spleen*FR*C_e_bound_spleen);
  C_bc_spleen' = 1/VBC_spleen*(Q_bc_spleen*C_bc_lung - Q_bc_spleen*C_bc_spleen);
  C_is_spleen' = 1/VIS_spleen*((1 - sigma_V_spleen)*L_spleen*C_p_spleen - (1 - sigma_L_spleen)*L_spleen*C_is_spleen + CLup_spleen*(1 - FR)*C_e_bound_spleen - CLup_spleen*C_is_spleen);
  C_e_unbound_spleen' = 1/VES_spleen*(CLup_spleen*(C_p_spleen + C_is_spleen) - VES_spleen*kon_FcRn*C_e_unbound_spleen*FcRn_free_spleen + VES_spleen*koff_FcRn*C_e_bound_spleen - kdeg*C_e_unbound_spleen*VES_spleen);
  C_e_bound_spleen' = 1/VES_spleen*(VES_spleen*kon_FcRn*C_e_unbound_spleen*FcRn_free_spleen - VES_spleen*koff_FcRn*C_e_bound_spleen - CLup_spleen*C_e_bound_spleen);
  FcRn_free_spleen' = 1/VES_spleen*(koff_FcRn*C_e_bound_spleen*VES_spleen - kon_FcRn*C_e_unbound_spleen*FcRn_free_spleen*VES_spleen + CLup_spleen*C_e_bound_spleen);
  C_p_pancreas' = 1/Vp_pancreas*(Q_p_pancreas*C_p_lung - Q_p_pancreas*C_p_pancreas - (1 - sigma_V_pancreas)*L_pancreas*C_p_pancreas - CLup_pancreas*C_p_pancreas + CLup_pancreas*FR*C_e_bound_pancreas);
  C_bc_pancreas' = 1/VBC_pancreas*(Q_bc_pancreas*C_bc_lung - Q_bc_pancreas*C_bc_pancreas);
  C_is_pancreas' = 1/VIS_pancreas*((1 - sigma_V_pancreas)*L_pancreas*C_p_pancreas - (1 - sigma_L_pancreas)*L_pancreas*C_is_pancreas + CLup_pancreas*(1 - FR)*C_e_bound_pancreas - CLup_pancreas*C_is_pancreas);
  C_e_unbound_pancreas' = 1/VES_pancreas*(CLup_pancreas*(C_p_pancreas + C_is_pancreas) - VES_pancreas*kon_FcRn*C_e_unbound_pancreas*FcRn_free_pancreas + VES_pancreas*koff_FcRn*C_e_bound_pancreas - kdeg*C_e_unbound_pancreas*VES_pancreas);
  C_e_bound_pancreas' = 1/VES_pancreas*(VES_pancreas*kon_FcRn*C_e_unbound_pancreas*FcRn_free_pancreas - VES_pancreas*koff_FcRn*C_e_bound_pancreas - CLup_pancreas*C_e_bound_pancreas);
  FcRn_free_pancreas' = 1/VES_pancreas*(koff_FcRn*C_e_bound_pancreas*VES_pancreas - kon_FcRn*C_e_unbound_pancreas*FcRn_free_pancreas*VES_pancreas + CLup_pancreas*C_e_bound_pancreas);
  C_p_other' = 1/Vp_other*(Q_p_other*C_p_lung - Q_p_other*C_p_other - (1 - sigma_V_other)*L_other*C_p_other - CLup_other*C_p_other + CLup_other*FR*C_e_bound_other);
  C_bc_other' = 1/VBC_other*(Q_bc_other*C_bc_lung - Q_bc_other*C_bc_other);
  C_is_other' = 1/VIS_other*((1 - sigma_V_other)*L_other*C_p_other - (1 - sigma_L_other)*L_other*C_is_other + CLup_other*(1 - FR)*C_e_bound_other - CLup_other*C_is_other);
  C_e_unbound_other' = 1/VES_other*(CLup_other*(C_p_other + C_is_other) - VES_other*kon_FcRn*C_e_unbound_other*FcRn_free_other + VES_other*koff_FcRn*C_e_bound_other - kdeg*C_e_unbound_other*VES_other);
  C_e_bound_other' = 1/VES_other*(VES_other*kon_FcRn*C_e_unbound_other*FcRn_free_other - VES_other*koff_FcRn*C_e_bound_other - CLup_other*C_e_bound_other);
  FcRn_free_other' = 1/VES_other*(koff_FcRn*C_e_bound_other*VES_other - kon_FcRn*C_e_unbound_other*FcRn_free_other*VES_other + CLup_other*C_e_bound_other);
end
